# OpenSim document version 40000
Model LandingReflexesModel:
  gravity: 0 -9.80665 0
  length_units: meters
  force_units: N
  credits:
    Developed by Ajay Seth (addition of reflex controller to posture model with passive forces, foot contact and moveable platform) and Matt DeMers (initial drop height and platform orientation, inverter and everter muscles, linear ankle bushings). As a courtesy to the model developers, we request that you notify us (via email at opensim@stanford.edu) and acknowledge the authors (Ajay Seth and Matt DeMers) when distributing or publishing any results based on this model. Please also acknowledge the authors when distributing or publishing any models that derive from this work. The model and controller used in this example are for educational and demonstration purposes and require further testing before being used as a research tool. This is work currently being conducted by the authors.
  publications:
    Notes: 3D, 23 DOF gait model created by D.G. Thelen, Univ. of Wisconsin-Madison, and Ajay Seth, Frank C. Anderson, and Scott L. Delp, Stanford University. Lower extremity joint defintions based on Delp et al. (1990). Low back joint and anthropometry based on Anderson and Pandy (1999, 2001). Planar knee model of Yamaguchi and Zajac (1989). Seth removed the patella to avoid kinematic constraints; insertions of the quadrucepts are handled with moving points in the tibia frame. Number of muscles was reduced by Anderson to improve simulation speed for demonstrations and is not intended to be used in research. Delp, S.L., Loan, J.P., Hoy, M.G., Zajac, F.E., Topp E.L., Rosen, J.M.: An interactive graphics-based model of the lower extremity to study orthopaedic surgical procedures, IEEE Transactions on Biomedical Engineering, vol. 37, pp. 757-767, 1990. Yamaguchi G.T., Zajac F.E.: A planar model of the knee joint to characterize the knee extensor mechanism." J . Biomech. 22(1):1-10. 1989. Anderson F.C., Pandy M.G.: A dynamic optimization solution for vertical jumping in three dimensions. Computer Methods in Biomechanics and Biomedical Engineering 2:201-231, 1999. Anderson F.C., Pandy M.G.: Dynamic optimization of human walking. Journal of Biomechanical Engineering 123:381-390, 2001.
  MuscleReflexCircuit [values shared by the 70 below unless stated]: defaultControlSignal=0.09 timeDelay=0.6
      threshold=0.015 normalizedRestLength=1 weights=(1 7 -0.5)
  MuscleReflexCircuit glut_med1_r: socket_muscle=/forceset/glut_med1_r
    SimpleSpindle: socket_muscle=/forceset/glut_med1_r normalizedRestLength=1
    GolgiTendon: socket_muscle=/forceset/glut_med1_r
    Delay: input_signal=/glut_med1_r/interneuron|interneuron_signal delay=0.6 [seconds] defaultControlSignal=0.09
    Interneuron: input_afferents=(/glut_med1_r/simplespindle|spindle_length /glut_med1_r/simplespindle|spindle_speed /glut_med1_r/golgitendon|golgiLength)
        threshold=0.015 weights=(1 7 -0.5)
  MuscleReflexCircuit glut_med2_r: socket_muscle=/forceset/glut_med2_r
    SimpleSpindle: socket_muscle=/forceset/glut_med2_r normalizedRestLength=1
    GolgiTendon: socket_muscle=/forceset/glut_med2_r
    Delay: input_signal=/glut_med2_r/interneuron|interneuron_signal delay=0.6 defaultControlSignal=0.09
    Interneuron: input_afferents=(/glut_med2_r/simplespindle|spindle_length /glut_med2_r/simplespindle|spindle_speed /glut_med2_r/golgitendon|golgiLength)
        threshold=0.015 weights=(1 7 -0.5)
  MuscleReflexCircuit glut_med3_r: socket_muscle=/forceset/glut_med3_r
    SimpleSpindle: socket_muscle=/forceset/glut_med3_r normalizedRestLength=1
    GolgiTendon: socket_muscle=/forceset/glut_med3_r
    Delay: input_signal=/glut_med3_r/interneuron|interneuron_signal delay=0.6 defaultControlSignal=0.09
    Interneuron: input_afferents=(/glut_med3_r/simplespindle|spindle_length /glut_med3_r/simplespindle|spindle_speed /glut_med3_r/golgitendon|golgiLength)
        threshold=0.015 weights=(1 7 -0.5)
  MuscleReflexCircuit bifemlh_r: socket_muscle=/forceset/bifemlh_r
    SimpleSpindle: socket_muscle=/forceset/bifemlh_r normalizedRestLength=1
    GolgiTendon: socket_muscle=/forceset/bifemlh_r
    Delay: input_signal=/bifemlh_r/interneuron|interneuron_signal delay=0.6 defaultControlSignal=0.09
    Interneuron: input_afferents=(/bifemlh_r/simplespindle|spindle_length /bifemlh_r/simplespindle|spindle_speed /bifemlh_r/golgitendon|golgiLength)
        threshold=0.015 weights=(1 7 -0.5)
  MuscleReflexCircuit bifemsh_r: socket_muscle=/forceset/bifemsh_r
    SimpleSpindle: socket_muscle=/forceset/bifemsh_r normalizedRestLength=1
    GolgiTendon: socket_muscle=/forceset/bifemsh_r
    Delay: input_signal=/bifemsh_r/interneuron|interneuron_signal delay=0.6 defaultControlSignal=0.09
    Interneuron: input_afferents=(/bifemsh_r/simplespindle|spindle_length /bifemsh_r/simplespindle|spindle_speed /bifemsh_r/golgitendon|golgiLength)
        threshold=0.015 weights=(1 7 -0.5)
  MuscleReflexCircuit sar_r: socket_muscle=/forceset/sar_r
    SimpleSpindle: socket_muscle=/forceset/sar_r normalizedRestLength=1
    GolgiTendon: socket_muscle=/forceset/sar_r
    Delay: input_signal=/sar_r/interneuron|interneuron_signal delay=0.6 defaultControlSignal=0.09
    Interneuron: input_afferents=(/sar_r/simplespindle|spindle_length /sar_r/simplespindle|spindle_speed /sar_r/golgitendon|golgiLength)
        threshold=0.015 weights=(1 7 -0.5)
  MuscleReflexCircuit add_mag2_r: socket_muscle=/forceset/add_mag2_r
    SimpleSpindle: socket_muscle=/forceset/add_mag2_r normalizedRestLength=1
    GolgiTendon: socket_muscle=/forceset/add_mag2_r
    Delay: input_signal=/add_mag2_r/interneuron|interneuron_signal delay=0.6 defaultControlSignal=0.09
    Interneuron: input_afferents=(/add_mag2_r/simplespindle|spindle_length /add_mag2_r/simplespindle|spindle_speed /add_mag2_r/golgitendon|golgiLength)
        threshold=0.015 weights=(1 7 -0.5)
  MuscleReflexCircuit tfl_r: socket_muscle=/forceset/tfl_r
    SimpleSpindle: socket_muscle=/forceset/tfl_r normalizedRestLength=1
    GolgiTendon: socket_muscle=/forceset/tfl_r
    Delay: input_signal=/tfl_r/interneuron|interneuron_signal delay=0.6 defaultControlSignal=0.09
    Interneuron: input_afferents=(/tfl_r/simplespindle|spindle_length /tfl_r/simplespindle|spindle_speed /tfl_r/golgitendon|golgiLength)
        threshold=0.015 weights=(1 7 -0.5)
  MuscleReflexCircuit pect_r: socket_muscle=/forceset/pect_r
    SimpleSpindle: socket_muscle=/forceset/pect_r normalizedRestLength=1
    GolgiTendon: socket_muscle=/forceset/pect_r
    Delay: input_signal=/pect_r/interneuron|interneuron_signal delay=0.6 defaultControlSignal=0.09
    Interneuron: input_afferents=(/pect_r/simplespindle|spindle_length /pect_r/simplespindle|spindle_speed /pect_r/golgitendon|golgiLength)
        threshold=0.015 weights=(1 7 -0.5)
  MuscleReflexCircuit grac_r: socket_muscle=/forceset/grac_r
    SimpleSpindle: socket_muscle=/forceset/grac_r normalizedRestLength=1
    GolgiTendon: socket_muscle=/forceset/grac_r
    Delay: input_signal=/grac_r/interneuron|interneuron_signal delay=0.6 defaultControlSignal=0.09
    Interneuron: input_afferents=(/grac_r/simplespindle|spindle_length /grac_r/simplespindle|spindle_speed /grac_r/golgitendon|golgiLength)
        threshold=0.015 weights=(1 7 -0.5)
  MuscleReflexCircuit glut_max1_r: socket_muscle=/forceset/glut_max1_r
    SimpleSpindle: socket_muscle=/forceset/glut_max1_r normalizedRestLength=1
    GolgiTendon: socket_muscle=/forceset/glut_max1_r
    Delay: input_signal=/glut_max1_r/interneuron|interneuron_signal delay=0.6 defaultControlSignal=0.09
    Interneuron: input_afferents=(/glut_max1_r/simplespindle|spindle_length /glut_max1_r/simplespindle|spindle_speed /glut_max1_r/golgitendon|golgiLength)
        threshold=0.015 weights=(1 7 -0.5)
  MuscleReflexCircuit glut_max2_r: socket_muscle=/forceset/glut_max2_r
    SimpleSpindle: socket_muscle=/forceset/glut_max2_r normalizedRestLength=1
    GolgiTendon: socket_muscle=/forceset/glut_max2_r
    Delay: input_signal=/glut_max2_r/interneuron|interneuron_signal delay=0.6 defaultControlSignal=0.09
    Interneuron: input_afferents=(/glut_max2_r/simplespindle|spindle_length /glut_max2_r/simplespindle|spindle_speed /glut_max2_r/golgitendon|golgiLength)
        threshold=0.015 weights=(1 7 -0.5)
  MuscleReflexCircuit glut_max3_r: socket_muscle=/forceset/glut_max3_r
    SimpleSpindle: socket_muscle=/forceset/glut_max3_r normalizedRestLength=1
    GolgiTendon: socket_muscle=/forceset/glut_max3_r
    Delay: input_signal=/glut_max3_r/interneuron|interneuron_signal delay=0.6 defaultControlSignal=0.09
    Interneuron: input_afferents=(/glut_max3_r/simplespindle|spindle_length /glut_max3_r/simplespindle|spindle_speed /glut_max3_r/golgitendon|golgiLength)
        threshold=0.015 weights=(1 7 -0.5)
  MuscleReflexCircuit iliacus_r: socket_muscle=/forceset/iliacus_r
    SimpleSpindle: socket_muscle=/forceset/iliacus_r normalizedRestLength=1
    GolgiTendon: socket_muscle=/forceset/iliacus_r
    Delay: input_signal=/iliacus_r/interneuron|interneuron_signal delay=0.6 defaultControlSignal=0.09
    Interneuron: input_afferents=(/iliacus_r/simplespindle|spindle_length /iliacus_r/simplespindle|spindle_speed /iliacus_r/golgitendon|golgiLength)
        threshold=0.015 weights=(1 7 -0.5)
  MuscleReflexCircuit psoas_r: socket_muscle=/forceset/psoas_r
    SimpleSpindle: socket_muscle=/forceset/psoas_r normalizedRestLength=1
    GolgiTendon: socket_muscle=/forceset/psoas_r
    Delay: input_signal=/psoas_r/interneuron|interneuron_signal delay=0.6 defaultControlSignal=0.09
    Interneuron: input_afferents=(/psoas_r/simplespindle|spindle_length /psoas_r/simplespindle|spindle_speed /psoas_r/golgitendon|golgiLength)
        threshold=0.015 weights=(1 7 -0.5)
  MuscleReflexCircuit quad_fem_r: socket_muscle=/forceset/quad_fem_r
    SimpleSpindle: socket_muscle=/forceset/quad_fem_r normalizedRestLength=1
    GolgiTendon: socket_muscle=/forceset/quad_fem_r
    Delay: input_signal=/quad_fem_r/interneuron|interneuron_signal delay=0.6 defaultControlSignal=0.09
    Interneuron: input_afferents=(/quad_fem_r/simplespindle|spindle_length /quad_fem_r/simplespindle|spindle_speed /quad_fem_r/golgitendon|golgiLength)
        threshold=0.015 weights=(1 7 -0.5)
  MuscleReflexCircuit gem_r: socket_muscle=/forceset/gem_r
    SimpleSpindle: socket_muscle=/forceset/gem_r normalizedRestLength=1
    GolgiTendon: socket_muscle=/forceset/gem_r
    Delay: input_signal=/gem_r/interneuron|interneuron_signal delay=0.6 defaultControlSignal=0.09
    Interneuron: input_afferents=(/gem_r/simplespindle|spindle_length /gem_r/simplespindle|spindle_speed /gem_r/golgitendon|golgiLength)
        threshold=0.015 weights=(1 7 -0.5)
  MuscleReflexCircuit peri_r: socket_muscle=/forceset/peri_r
    SimpleSpindle: socket_muscle=/forceset/peri_r normalizedRestLength=1
    GolgiTendon: socket_muscle=/forceset/peri_r
    Delay: input_signal=/peri_r/interneuron|interneuron_signal delay=0.6 defaultControlSignal=0.09
    Interneuron: input_afferents=(/peri_r/simplespindle|spindle_length /peri_r/simplespindle|spindle_speed /peri_r/golgitendon|golgiLength)
        threshold=0.015 weights=(1 7 -0.5)
  MuscleReflexCircuit rect_fem_r: socket_muscle=/forceset/rect_fem_r
    SimpleSpindle: socket_muscle=/forceset/rect_fem_r normalizedRestLength=1
    GolgiTendon: socket_muscle=/forceset/rect_fem_r
    Delay: input_signal=/rect_fem_r/interneuron|interneuron_signal delay=0.6 defaultControlSignal=0.09
    Interneuron: input_afferents=(/rect_fem_r/simplespindle|spindle_length /rect_fem_r/simplespindle|spindle_speed /rect_fem_r/golgitendon|golgiLength)
        threshold=0.015 weights=(1 7 -0.5)
  MuscleReflexCircuit vas_int_r: socket_muscle=/forceset/vas_int_r
    SimpleSpindle: socket_muscle=/forceset/vas_int_r normalizedRestLength=1
    GolgiTendon: socket_muscle=/forceset/vas_int_r
    Delay: input_signal=/vas_int_r/interneuron|interneuron_signal delay=0.6 defaultControlSignal=0.09
    Interneuron: input_afferents=(/vas_int_r/simplespindle|spindle_length /vas_int_r/simplespindle|spindle_speed /vas_int_r/golgitendon|golgiLength)
        threshold=0.015 weights=(1 7 -0.5)
  MuscleReflexCircuit med_gas_r: socket_muscle=/forceset/med_gas_r
    SimpleSpindle: socket_muscle=/forceset/med_gas_r normalizedRestLength=1
    GolgiTendon: socket_muscle=/forceset/med_gas_r
    Delay: input_signal=/med_gas_r/interneuron|interneuron_signal delay=0.6 defaultControlSignal=0.09
    Interneuron: input_afferents=(/med_gas_r/simplespindle|spindle_length /med_gas_r/simplespindle|spindle_speed /med_gas_r/golgitendon|golgiLength)
        threshold=0.015 weights=(1 7 -0.5)
  MuscleReflexCircuit lat_gas_r: socket_muscle=/forceset/lat_gas_r
    SimpleSpindle: socket_muscle=/forceset/lat_gas_r normalizedRestLength=1
    GolgiTendon: socket_muscle=/forceset/lat_gas_r
    Delay: input_signal=/lat_gas_r/interneuron|interneuron_signal delay=0.6 defaultControlSignal=0.09
    Interneuron: input_afferents=(/lat_gas_r/simplespindle|spindle_length /lat_gas_r/simplespindle|spindle_speed /lat_gas_r/golgitendon|golgiLength)
        threshold=0.015 weights=(1 7 -0.5)
  MuscleReflexCircuit soleus_r: socket_muscle=/forceset/soleus_r
    SimpleSpindle: socket_muscle=/forceset/soleus_r normalizedRestLength=1
    GolgiTendon: socket_muscle=/forceset/soleus_r
    Delay: input_signal=/soleus_r/interneuron|interneuron_signal delay=0.6 defaultControlSignal=0.09
    Interneuron: input_afferents=(/soleus_r/simplespindle|spindle_length /soleus_r/simplespindle|spindle_speed /soleus_r/golgitendon|golgiLength)
        threshold=0.015 weights=(1 7 -0.5)
  MuscleReflexCircuit tib_post_r: socket_muscle=/forceset/tib_post_r
    SimpleSpindle: socket_muscle=/forceset/tib_post_r normalizedRestLength=1
    GolgiTendon: socket_muscle=/forceset/tib_post_r
    Delay: input_signal=/tib_post_r/interneuron|interneuron_signal delay=0.6 defaultControlSignal=0.09
    Interneuron: input_afferents=(/tib_post_r/simplespindle|spindle_length /tib_post_r/simplespindle|spindle_speed /tib_post_r/golgitendon|golgiLength)
        threshold=0.015 weights=(1 7 -0.5)
  MuscleReflexCircuit flex_dig_r: socket_muscle=/forceset/flex_dig_r
    SimpleSpindle: socket_muscle=/forceset/flex_dig_r normalizedRestLength=1
    GolgiTendon: socket_muscle=/forceset/flex_dig_r
    Delay: input_signal=/flex_dig_r/interneuron|interneuron_signal delay=0.6 defaultControlSignal=0.09
    Interneuron: input_afferents=(/flex_dig_r/simplespindle|spindle_length /flex_dig_r/simplespindle|spindle_speed /flex_dig_r/golgitendon|golgiLength)
        threshold=0.015 weights=(1 7 -0.5)
  MuscleReflexCircuit flex_hal_r: socket_muscle=/forceset/flex_hal_r
    SimpleSpindle: socket_muscle=/forceset/flex_hal_r normalizedRestLength=1
    GolgiTendon: socket_muscle=/forceset/flex_hal_r
    Delay: input_signal=/flex_hal_r/interneuron|interneuron_signal delay=0.6 defaultControlSignal=0.09
    Interneuron: input_afferents=(/flex_hal_r/simplespindle|spindle_length /flex_hal_r/simplespindle|spindle_speed /flex_hal_r/golgitendon|golgiLength)
        threshold=0.015 weights=(1 7 -0.5)
  MuscleReflexCircuit tib_ant_r: socket_muscle=/forceset/tib_ant_r
    SimpleSpindle: socket_muscle=/forceset/tib_ant_r normalizedRestLength=1
    GolgiTendon: socket_muscle=/forceset/tib_ant_r
    Delay: input_signal=/tib_ant_r/interneuron|interneuron_signal delay=0.6 defaultControlSignal=0.09
    Interneuron: input_afferents=(/tib_ant_r/simplespindle|spindle_length /tib_ant_r/simplespindle|spindle_speed /tib_ant_r/golgitendon|golgiLength)
        threshold=0.015 weights=(1 7 -0.5)
  MuscleReflexCircuit per_brev_r: socket_muscle=/forceset/per_brev_r
    SimpleSpindle: socket_muscle=/forceset/per_brev_r normalizedRestLength=1
    GolgiTendon: socket_muscle=/forceset/per_brev_r
    Delay: input_signal=/per_brev_r/interneuron|interneuron_signal delay=0.6 defaultControlSignal=0.09
    Interneuron: input_afferents=(/per_brev_r/simplespindle|spindle_length /per_brev_r/simplespindle|spindle_speed /per_brev_r/golgitendon|golgiLength)
        threshold=0.015 weights=(1 7 -0.5)
  MuscleReflexCircuit per_long_r: socket_muscle=/forceset/per_long_r
    SimpleSpindle: socket_muscle=/forceset/per_long_r normalizedRestLength=1
    GolgiTendon: socket_muscle=/forceset/per_long_r
    Delay: input_signal=/per_long_r/interneuron|interneuron_signal delay=0.6 defaultControlSignal=0.09
    Interneuron: input_afferents=(/per_long_r/simplespindle|spindle_length /per_long_r/simplespindle|spindle_speed /per_long_r/golgitendon|golgiLength)
        threshold=0.015 weights=(1 7 -0.5)
  MuscleReflexCircuit per_tert_r: socket_muscle=/forceset/per_tert_r
    SimpleSpindle: socket_muscle=/forceset/per_tert_r normalizedRestLength=1
    GolgiTendon: socket_muscle=/forceset/per_tert_r
    Delay: input_signal=/per_tert_r/interneuron|interneuron_signal delay=0.6 defaultControlSignal=0.09
    Interneuron: input_afferents=(/per_tert_r/simplespindle|spindle_length /per_tert_r/simplespindle|spindle_speed /per_tert_r/golgitendon|golgiLength)
        threshold=0.015 weights=(1 7 -0.5)
  MuscleReflexCircuit ext_dig_r: socket_muscle=/forceset/ext_dig_r
    SimpleSpindle: socket_muscle=/forceset/ext_dig_r normalizedRestLength=1
    GolgiTendon: socket_muscle=/forceset/ext_dig_r
    Delay: input_signal=/ext_dig_r/interneuron|interneuron_signal delay=0.6 defaultControlSignal=0.09
    Interneuron: input_afferents=(/ext_dig_r/simplespindle|spindle_length /ext_dig_r/simplespindle|spindle_speed /ext_dig_r/golgitendon|golgiLength)
        threshold=0.015 weights=(1 7 -0.5)
  MuscleReflexCircuit ext_hal_r: socket_muscle=/forceset/ext_hal_r
    SimpleSpindle: socket_muscle=/forceset/ext_hal_r normalizedRestLength=1
    GolgiTendon: socket_muscle=/forceset/ext_hal_r
    Delay: input_signal=/ext_hal_r/interneuron|interneuron_signal delay=0.6 defaultControlSignal=0.09
    Interneuron: input_afferents=(/ext_hal_r/simplespindle|spindle_length /ext_hal_r/simplespindle|spindle_speed /ext_hal_r/golgitendon|golgiLength)
        threshold=0.015 weights=(1 7 -0.5)
  MuscleReflexCircuit glut_med1_l: socket_muscle=/forceset/glut_med1_l
    SimpleSpindle: socket_muscle=/forceset/glut_med1_l normalizedRestLength=1
    GolgiTendon: socket_muscle=/forceset/glut_med1_l
    Delay: input_signal=/glut_med1_l/interneuron|interneuron_signal delay=0.6 defaultControlSignal=0.09
    Interneuron: input_afferents=(/glut_med1_l/simplespindle|spindle_length /glut_med1_l/simplespindle|spindle_speed /glut_med1_l/golgitendon|golgiLength)
        threshold=0.015 weights=(1 7 -0.5)
  MuscleReflexCircuit glut_med2_l: socket_muscle=/forceset/glut_med2_l
    SimpleSpindle: socket_muscle=/forceset/glut_med2_l normalizedRestLength=1
    GolgiTendon: socket_muscle=/forceset/glut_med2_l
    Delay: input_signal=/glut_med2_l/interneuron|interneuron_signal delay=0.6 defaultControlSignal=0.09
    Interneuron: input_afferents=(/glut_med2_l/simplespindle|spindle_length /glut_med2_l/simplespindle|spindle_speed /glut_med2_l/golgitendon|golgiLength)
        threshold=0.015 weights=(1 7 -0.5)
  MuscleReflexCircuit glut_med3_l: socket_muscle=/forceset/glut_med3_l
    SimpleSpindle: socket_muscle=/forceset/glut_med3_l normalizedRestLength=1
    GolgiTendon: socket_muscle=/forceset/glut_med3_l
    Delay: input_signal=/glut_med3_l/interneuron|interneuron_signal delay=0.6 defaultControlSignal=0.09
    Interneuron: input_afferents=(/glut_med3_l/simplespindle|spindle_length /glut_med3_l/simplespindle|spindle_speed /glut_med3_l/golgitendon|golgiLength)
        threshold=0.015 weights=(1 7 -0.5)
  MuscleReflexCircuit bifemlh_l: socket_muscle=/forceset/bifemlh_l
    SimpleSpindle: socket_muscle=/forceset/bifemlh_l normalizedRestLength=1
    GolgiTendon: socket_muscle=/forceset/bifemlh_l
    Delay: input_signal=/bifemlh_l/interneuron|interneuron_signal delay=0.6 defaultControlSignal=0.09
    Interneuron: input_afferents=(/bifemlh_l/simplespindle|spindle_length /bifemlh_l/simplespindle|spindle_speed /bifemlh_l/golgitendon|golgiLength)
        threshold=0.015 weights=(1 7 -0.5)
  MuscleReflexCircuit bifemsh_l: socket_muscle=/forceset/bifemsh_l
    SimpleSpindle: socket_muscle=/forceset/bifemsh_l normalizedRestLength=1
    GolgiTendon: socket_muscle=/forceset/bifemsh_l
    Delay: input_signal=/bifemsh_l/interneuron|interneuron_signal delay=0.6 defaultControlSignal=0.09
    Interneuron: input_afferents=(/bifemsh_l/simplespindle|spindle_length /bifemsh_l/simplespindle|spindle_speed /bifemsh_l/golgitendon|golgiLength)
        threshold=0.015 weights=(1 7 -0.5)
  MuscleReflexCircuit sar_l: socket_muscle=/forceset/sar_l
    SimpleSpindle: socket_muscle=/forceset/sar_l normalizedRestLength=1
    GolgiTendon: socket_muscle=/forceset/sar_l
    Delay: input_signal=/sar_l/interneuron|interneuron_signal delay=0.6 defaultControlSignal=0.09
    Interneuron: input_afferents=(/sar_l/simplespindle|spindle_length /sar_l/simplespindle|spindle_speed /sar_l/golgitendon|golgiLength)
        threshold=0.015 weights=(1 7 -0.5)
  MuscleReflexCircuit add_mag2_l: socket_muscle=/forceset/add_mag2_l
    SimpleSpindle: socket_muscle=/forceset/add_mag2_l normalizedRestLength=1
    GolgiTendon: socket_muscle=/forceset/add_mag2_l
    Delay: input_signal=/add_mag2_l/interneuron|interneuron_signal delay=0.6 defaultControlSignal=0.09
    Interneuron: input_afferents=(/add_mag2_l/simplespindle|spindle_length /add_mag2_l/simplespindle|spindle_speed /add_mag2_l/golgitendon|golgiLength)
        threshold=0.015 weights=(1 7 -0.5)
  MuscleReflexCircuit tfl_l: socket_muscle=/forceset/tfl_l
    SimpleSpindle: socket_muscle=/forceset/tfl_l normalizedRestLength=1
    GolgiTendon: socket_muscle=/forceset/tfl_l
    Delay: input_signal=/tfl_l/interneuron|interneuron_signal delay=0.6 defaultControlSignal=0.09
    Interneuron: input_afferents=(/tfl_l/simplespindle|spindle_length /tfl_l/simplespindle|spindle_speed /tfl_l/golgitendon|golgiLength)
        threshold=0.015 weights=(1 7 -0.5)
  MuscleReflexCircuit pect_l: socket_muscle=/forceset/pect_l
    SimpleSpindle: socket_muscle=/forceset/pect_l normalizedRestLength=1
    GolgiTendon: socket_muscle=/forceset/pect_l
    Delay: input_signal=/pect_l/interneuron|interneuron_signal delay=0.6 defaultControlSignal=0.09
    Interneuron: input_afferents=(/pect_l/simplespindle|spindle_length /pect_l/simplespindle|spindle_speed /pect_l/golgitendon|golgiLength)
        threshold=0.015 weights=(1 7 -0.5)
  MuscleReflexCircuit grac_l: socket_muscle=/forceset/grac_l
    SimpleSpindle: socket_muscle=/forceset/grac_l normalizedRestLength=1
    GolgiTendon: socket_muscle=/forceset/grac_l
    Delay: input_signal=/grac_l/interneuron|interneuron_signal delay=0.6 defaultControlSignal=0.09
    Interneuron: input_afferents=(/grac_l/simplespindle|spindle_length /grac_l/simplespindle|spindle_speed /grac_l/golgitendon|golgiLength)
        threshold=0.015 weights=(1 7 -0.5)
  MuscleReflexCircuit glut_max1_l: socket_muscle=/forceset/glut_max1_l
    SimpleSpindle: socket_muscle=/forceset/glut_max1_l normalizedRestLength=1
    GolgiTendon: socket_muscle=/forceset/glut_max1_l
    Delay: input_signal=/glut_max1_l/interneuron|interneuron_signal delay=0.6 defaultControlSignal=0.09
    Interneuron: input_afferents=(/glut_max1_l/simplespindle|spindle_length /glut_max1_l/simplespindle|spindle_speed /glut_max1_l/golgitendon|golgiLength)
        threshold=0.015 weights=(1 7 -0.5)
  MuscleReflexCircuit glut_max2_l: socket_muscle=/forceset/glut_max2_l
    SimpleSpindle: socket_muscle=/forceset/glut_max2_l normalizedRestLength=1
    GolgiTendon: socket_muscle=/forceset/glut_max2_l
    Delay: input_signal=/glut_max2_l/interneuron|interneuron_signal delay=0.6 defaultControlSignal=0.09
    Interneuron: input_afferents=(/glut_max2_l/simplespindle|spindle_length /glut_max2_l/simplespindle|spindle_speed /glut_max2_l/golgitendon|golgiLength)
        threshold=0.015 weights=(1 7 -0.5)
  MuscleReflexCircuit glut_max3_l: socket_muscle=/forceset/glut_max3_l
    SimpleSpindle: socket_muscle=/forceset/glut_max3_l normalizedRestLength=1
    GolgiTendon: socket_muscle=/forceset/glut_max3_l
    Delay: input_signal=/glut_max3_l/interneuron|interneuron_signal delay=0.6 defaultControlSignal=0.09
    Interneuron: input_afferents=(/glut_max3_l/simplespindle|spindle_length /glut_max3_l/simplespindle|spindle_speed /glut_max3_l/golgitendon|golgiLength)
        threshold=0.015 weights=(1 7 -0.5)
  MuscleReflexCircuit iliacus_l: socket_muscle=/forceset/iliacus_l
    SimpleSpindle: socket_muscle=/forceset/iliacus_l normalizedRestLength=1
    GolgiTendon: socket_muscle=/forceset/iliacus_l
    Delay: input_signal=/iliacus_l/interneuron|interneuron_signal delay=0.6 defaultControlSignal=0.09
    Interneuron: input_afferents=(/iliacus_l/simplespindle|spindle_length /iliacus_l/simplespindle|spindle_speed /iliacus_l/golgitendon|golgiLength)
        threshold=0.015 weights=(1 7 -0.5)
  MuscleReflexCircuit psoas_l: socket_muscle=/forceset/psoas_l
    SimpleSpindle: socket_muscle=/forceset/psoas_l normalizedRestLength=1
    GolgiTendon: socket_muscle=/forceset/psoas_l
    Delay: input_signal=/psoas_l/interneuron|interneuron_signal delay=0.6 defaultControlSignal=0.09
    Interneuron: input_afferents=(/psoas_l/simplespindle|spindle_length /psoas_l/simplespindle|spindle_speed /psoas_l/golgitendon|golgiLength)
        threshold=0.015 weights=(1 7 -0.5)
  MuscleReflexCircuit quad_fem_l: socket_muscle=/forceset/quad_fem_l
    SimpleSpindle: socket_muscle=/forceset/quad_fem_l normalizedRestLength=1
    GolgiTendon: socket_muscle=/forceset/quad_fem_l
    Delay: input_signal=/quad_fem_l/interneuron|interneuron_signal delay=0.6 defaultControlSignal=0.09
    Interneuron: input_afferents=(/quad_fem_l/simplespindle|spindle_length /quad_fem_l/simplespindle|spindle_speed /quad_fem_l/golgitendon|golgiLength)
        threshold=0.015 weights=(1 7 -0.5)
  MuscleReflexCircuit gem_l: socket_muscle=/forceset/gem_l
    SimpleSpindle: socket_muscle=/forceset/gem_l normalizedRestLength=1
    GolgiTendon: socket_muscle=/forceset/gem_l
    Delay: input_signal=/gem_l/interneuron|interneuron_signal delay=0.6 defaultControlSignal=0.09
    Interneuron: input_afferents=(/gem_l/simplespindle|spindle_length /gem_l/simplespindle|spindle_speed /gem_l/golgitendon|golgiLength)
        threshold=0.015 weights=(1 7 -0.5)
  MuscleReflexCircuit peri_l: socket_muscle=/forceset/peri_l
    SimpleSpindle: socket_muscle=/forceset/peri_l normalizedRestLength=1
    GolgiTendon: socket_muscle=/forceset/peri_l
    Delay: input_signal=/peri_l/interneuron|interneuron_signal delay=0.6 defaultControlSignal=0.09
    Interneuron: input_afferents=(/peri_l/simplespindle|spindle_length /peri_l/simplespindle|spindle_speed /peri_l/golgitendon|golgiLength)
        threshold=0.015 weights=(1 7 -0.5)
  MuscleReflexCircuit rect_fem_l: socket_muscle=/forceset/rect_fem_l
    SimpleSpindle: socket_muscle=/forceset/rect_fem_l normalizedRestLength=1
    GolgiTendon: socket_muscle=/forceset/rect_fem_l
    Delay: input_signal=/rect_fem_l/interneuron|interneuron_signal delay=0.6 defaultControlSignal=0.09
    Interneuron: input_afferents=(/rect_fem_l/simplespindle|spindle_length /rect_fem_l/simplespindle|spindle_speed /rect_fem_l/golgitendon|golgiLength)
        threshold=0.015 weights=(1 7 -0.5)
  MuscleReflexCircuit vas_int_l: socket_muscle=/forceset/vas_int_l
    SimpleSpindle: socket_muscle=/forceset/vas_int_l normalizedRestLength=1
    GolgiTendon: socket_muscle=/forceset/vas_int_l
    Delay: input_signal=/vas_int_l/interneuron|interneuron_signal delay=0.6 defaultControlSignal=0.09
    Interneuron: input_afferents=(/vas_int_l/simplespindle|spindle_length /vas_int_l/simplespindle|spindle_speed /vas_int_l/golgitendon|golgiLength)
        threshold=0.015 weights=(1 7 -0.5)
  MuscleReflexCircuit med_gas_l: socket_muscle=/forceset/med_gas_l
    SimpleSpindle: socket_muscle=/forceset/med_gas_l normalizedRestLength=1
    GolgiTendon: socket_muscle=/forceset/med_gas_l
    Delay: input_signal=/med_gas_l/interneuron|interneuron_signal delay=0.6 defaultControlSignal=0.09
    Interneuron: input_afferents=(/med_gas_l/simplespindle|spindle_length /med_gas_l/simplespindle|spindle_speed /med_gas_l/golgitendon|golgiLength)
        threshold=0.015 weights=(1 7 -0.5)
  MuscleReflexCircuit lat_gas_l: socket_muscle=/forceset/lat_gas_l
    SimpleSpindle: socket_muscle=/forceset/lat_gas_l normalizedRestLength=1
    GolgiTendon: socket_muscle=/forceset/lat_gas_l
    Delay: input_signal=/lat_gas_l/interneuron|interneuron_signal delay=0.6 defaultControlSignal=0.09
    Interneuron: input_afferents=(/lat_gas_l/simplespindle|spindle_length /lat_gas_l/simplespindle|spindle_speed /lat_gas_l/golgitendon|golgiLength)
        threshold=0.015 weights=(1 7 -0.5)
  MuscleReflexCircuit soleus_l: socket_muscle=/forceset/soleus_l
    SimpleSpindle: socket_muscle=/forceset/soleus_l normalizedRestLength=1
    GolgiTendon: socket_muscle=/forceset/soleus_l
    Delay: input_signal=/soleus_l/interneuron|interneuron_signal delay=0.6 defaultControlSignal=0.09
    Interneuron: input_afferents=(/soleus_l/simplespindle|spindle_length /soleus_l/simplespindle|spindle_speed /soleus_l/golgitendon|golgiLength)
        threshold=0.015 weights=(1 7 -0.5)
  MuscleReflexCircuit tib_post_l: socket_muscle=/forceset/tib_post_l
    SimpleSpindle: socket_muscle=/forceset/tib_post_l normalizedRestLength=1
    GolgiTendon: socket_muscle=/forceset/tib_post_l
    Delay: input_signal=/tib_post_l/interneuron|interneuron_signal delay=0.6 defaultControlSignal=0.09
    Interneuron: input_afferents=(/tib_post_l/simplespindle|spindle_length /tib_post_l/simplespindle|spindle_speed /tib_post_l/golgitendon|golgiLength)
        threshold=0.015 weights=(1 7 -0.5)
  MuscleReflexCircuit flex_dig_l: socket_muscle=/forceset/flex_dig_l
    SimpleSpindle: socket_muscle=/forceset/flex_dig_l normalizedRestLength=1
    GolgiTendon: socket_muscle=/forceset/flex_dig_l
    Delay: input_signal=/flex_dig_l/interneuron|interneuron_signal delay=0.6 defaultControlSignal=0.09
    Interneuron: input_afferents=(/flex_dig_l/simplespindle|spindle_length /flex_dig_l/simplespindle|spindle_speed /flex_dig_l/golgitendon|golgiLength)
        threshold=0.015 weights=(1 7 -0.5)
  MuscleReflexCircuit flex_hal_l: socket_muscle=/forceset/flex_hal_l
    SimpleSpindle: socket_muscle=/forceset/flex_hal_l normalizedRestLength=1
    GolgiTendon: socket_muscle=/forceset/flex_hal_l
    Delay: input_signal=/flex_hal_l/interneuron|interneuron_signal delay=0.6 defaultControlSignal=0.09
    Interneuron: input_afferents=(/flex_hal_l/simplespindle|spindle_length /flex_hal_l/simplespindle|spindle_speed /flex_hal_l/golgitendon|golgiLength)
        threshold=0.015 weights=(1 7 -0.5)
  MuscleReflexCircuit tib_ant_l: socket_muscle=/forceset/tib_ant_l
    SimpleSpindle: socket_muscle=/forceset/tib_ant_l normalizedRestLength=1
    GolgiTendon: socket_muscle=/forceset/tib_ant_l
    Delay: input_signal=/tib_ant_l/interneuron|interneuron_signal delay=0.6 defaultControlSignal=0.09
    Interneuron: input_afferents=(/tib_ant_l/simplespindle|spindle_length /tib_ant_l/simplespindle|spindle_speed /tib_ant_l/golgitendon|golgiLength)
        threshold=0.015 weights=(1 7 -0.5)
  MuscleReflexCircuit per_brev_l: socket_muscle=/forceset/per_brev_l
    SimpleSpindle: socket_muscle=/forceset/per_brev_l normalizedRestLength=1
    GolgiTendon: socket_muscle=/forceset/per_brev_l
    Delay: input_signal=/per_brev_l/interneuron|interneuron_signal delay=0.6 defaultControlSignal=0.09
    Interneuron: input_afferents=(/per_brev_l/simplespindle|spindle_length /per_brev_l/simplespindle|spindle_speed /per_brev_l/golgitendon|golgiLength)
        threshold=0.015 weights=(1 7 -0.5)
  MuscleReflexCircuit per_long_l: socket_muscle=/forceset/per_long_l
    SimpleSpindle: socket_muscle=/forceset/per_long_l normalizedRestLength=1
    GolgiTendon: socket_muscle=/forceset/per_long_l
    Delay: input_signal=/per_long_l/interneuron|interneuron_signal delay=0.6 defaultControlSignal=0.09
    Interneuron: input_afferents=(/per_long_l/simplespindle|spindle_length /per_long_l/simplespindle|spindle_speed /per_long_l/golgitendon|golgiLength)
        threshold=0.015 weights=(1 7 -0.5)
  MuscleReflexCircuit per_tert_l: socket_muscle=/forceset/per_tert_l
    SimpleSpindle: socket_muscle=/forceset/per_tert_l normalizedRestLength=1
    GolgiTendon: socket_muscle=/forceset/per_tert_l
    Delay: input_signal=/per_tert_l/interneuron|interneuron_signal delay=0.6 defaultControlSignal=0.09
    Interneuron: input_afferents=(/per_tert_l/simplespindle|spindle_length /per_tert_l/simplespindle|spindle_speed /per_tert_l/golgitendon|golgiLength)
        threshold=0.015 weights=(1 7 -0.5)
  MuscleReflexCircuit ext_dig_l: socket_muscle=/forceset/ext_dig_l
    SimpleSpindle: socket_muscle=/forceset/ext_dig_l normalizedRestLength=1
    GolgiTendon: socket_muscle=/forceset/ext_dig_l
    Delay: input_signal=/ext_dig_l/interneuron|interneuron_signal delay=0.6 defaultControlSignal=0.09
    Interneuron: input_afferents=(/ext_dig_l/simplespindle|spindle_length /ext_dig_l/simplespindle|spindle_speed /ext_dig_l/golgitendon|golgiLength)
        threshold=0.015 weights=(1 7 -0.5)
  MuscleReflexCircuit ext_hal_l: socket_muscle=/forceset/ext_hal_l
    SimpleSpindle: socket_muscle=/forceset/ext_hal_l normalizedRestLength=1
    GolgiTendon: socket_muscle=/forceset/ext_hal_l
    Delay: input_signal=/ext_hal_l/interneuron|interneuron_signal delay=0.6 defaultControlSignal=0.09
    Interneuron: input_afferents=(/ext_hal_l/simplespindle|spindle_length /ext_hal_l/simplespindle|spindle_speed /ext_hal_l/golgitendon|golgiLength)
        threshold=0.015 weights=(1 7 -0.5)
  MuscleReflexCircuit ercspn_r: socket_muscle=/forceset/ercspn_r
    SimpleSpindle: socket_muscle=/forceset/ercspn_r normalizedRestLength=1
    GolgiTendon: socket_muscle=/forceset/ercspn_r
    Delay: input_signal=/ercspn_r/interneuron|interneuron_signal delay=0.6 defaultControlSignal=0.09
    Interneuron: input_afferents=(/ercspn_r/simplespindle|spindle_length /ercspn_r/simplespindle|spindle_speed /ercspn_r/golgitendon|golgiLength)
        threshold=0.015 weights=(1 7 -0.5)
  MuscleReflexCircuit ercspn_l: socket_muscle=/forceset/ercspn_l
    SimpleSpindle: socket_muscle=/forceset/ercspn_l normalizedRestLength=1
    GolgiTendon: socket_muscle=/forceset/ercspn_l
    Delay: input_signal=/ercspn_l/interneuron|interneuron_signal delay=0.6 defaultControlSignal=0.09
    Interneuron: input_afferents=(/ercspn_l/simplespindle|spindle_length /ercspn_l/simplespindle|spindle_speed /ercspn_l/golgitendon|golgiLength)
        threshold=0.015 weights=(1 7 -0.5)
  MuscleReflexCircuit intobl_r: socket_muscle=/forceset/intobl_r
    SimpleSpindle: socket_muscle=/forceset/intobl_r normalizedRestLength=1
    GolgiTendon: socket_muscle=/forceset/intobl_r
    Delay: input_signal=/intobl_r/interneuron|interneuron_signal delay=0.6 defaultControlSignal=0.09
    Interneuron: input_afferents=(/intobl_r/simplespindle|spindle_length /intobl_r/simplespindle|spindle_speed /intobl_r/golgitendon|golgiLength)
        threshold=0.015 weights=(1 7 -0.5)
  MuscleReflexCircuit intobl_l: socket_muscle=/forceset/intobl_l
    SimpleSpindle: socket_muscle=/forceset/intobl_l normalizedRestLength=1
    GolgiTendon: socket_muscle=/forceset/intobl_l
    Delay: input_signal=/intobl_l/interneuron|interneuron_signal delay=0.6 defaultControlSignal=0.09
    Interneuron: input_afferents=(/intobl_l/simplespindle|spindle_length /intobl_l/simplespindle|spindle_speed /intobl_l/golgitendon|golgiLength)
        threshold=0.015 weights=(1 7 -0.5)
  MuscleReflexCircuit extobl_r: socket_muscle=/forceset/extobl_r
    SimpleSpindle: socket_muscle=/forceset/extobl_r normalizedRestLength=1
    GolgiTendon: socket_muscle=/forceset/extobl_r
    Delay: input_signal=/extobl_r/interneuron|interneuron_signal delay=0.6 defaultControlSignal=0.09
    Interneuron: input_afferents=(/extobl_r/simplespindle|spindle_length /extobl_r/simplespindle|spindle_speed /extobl_r/golgitendon|golgiLength)
        threshold=0.015 weights=(1 7 -0.5)
  MuscleReflexCircuit extobl_l: socket_muscle=/forceset/extobl_l
    SimpleSpindle: socket_muscle=/forceset/extobl_l normalizedRestLength=1
    GolgiTendon: socket_muscle=/forceset/extobl_l
    Delay: input_signal=/extobl_l/interneuron|interneuron_signal delay=0.6 defaultControlSignal=0.09
    Interneuron: input_afferents=(/extobl_l/simplespindle|spindle_length /extobl_l/simplespindle|spindle_speed /extobl_l/golgitendon|golgiLength)
        threshold=0.015 weights=(1 7 -0.5)
  Ground
  BodySet:
    Body platform: mass=0.1 [kg] mass_center=(0 0 0) inertia=(0.001 0.001 0.001 0 0 0)
    Body pelvis: mass=11.777 mass_center=(-0.0707 0 0) inertia=(0.1028 0.0871 0.0579 0 0 0)
        meshes=(sacrum.vtp pelvis.vtp l_pelvis.vtp)
    Body femur_r: mass=9.3014 mass_center=(0 -0.17 0) inertia=(0.1339 0.0351 0.1412 0 0 0) meshes=femur.vtp
    Body tibia_r: mass=3.7075 mass_center=(0 -0.1867 0) inertia=(0.0504 0.0051 0.0511 0 0 0)
        meshes=(tibia.vtp fibula.vtp)
    Body talus_r: mass=0.1 mass_center=(0 0 0) inertia=(0.001 0.001 0.001 0 0 0) meshes=talus.vtp
    Body calcn_r: mass=1.25 mass_center=(0.1 0.03 0) inertia=(0.0014 0.0039 0.0041 0 0 0) meshes=foot.vtp
    Body toes_r: mass=0.2166 mass_center=(0.0346 0.006 -0.0175) inertia=(0.0001 0.0002 0.0003 0 0 0) meshes=bofoot.vtp
    Body femur_l: mass=9.3014 mass_center=(0 -0.17 0) inertia=(0.1339 0.0351 0.1412 0 0 0) meshes=l_femur.vtp
    Body tibia_l: mass=3.7075 mass_center=(0 -0.1867 0) inertia=(0.0504 0.0051 0.0511 0 0 0)
        meshes=(l_tibia.vtp l_fibula.vtp)
    Body talus_l: mass=0.1 mass_center=(0 0 0) inertia=(0.001 0.001 0.001 0 0 0) meshes=l_talus.vtp
    Body calcn_l: mass=1.25 mass_center=(0.1 0.03 0) inertia=(0.0014 0.0039 0.0041 0 0 0) meshes=l_foot.vtp
    Body toes_l: mass=0.2166 mass_center=(0.0346 0.006 0.0175) inertia=(0.0001 0.0002 0.0003 0 0 0) meshes=l_bofoot.vtp
    Body torso: mass=34.2366 mass_center=(-0.03 0.32 0) inertia=(1.4745 0.7555 1.4314 0 0 0)
        meshes=(hat_spine.vtp hat_jaw.vtp hat_skull.vtp hat_ribs.vtp)
  JointSet:
    CustomJoint ground_platform: socket_parent_frame=ground_offset socket_child_frame=platform_offset
      Coordinate platform_rx: default_value=0 range=(-3.1416 3.1416) clamped=true locked=true
      Coordinate platform_ry: default_value=0 range=(-3.1416 3.1416) clamped=true locked=true
      Coordinate platform_rz: default_value=0 range=(-3.1416 3.1416) clamped=true locked=true
      Coordinate platform_ty: default_value=-0.3 range=(-5 1) clamped=true locked=true
      PhysicalOffsetFrame ground_offset: socket_parent=/ground translation=(0 0 0) [meters]
      PhysicalOffsetFrame platform_offset: socket_parent=/bodyset/platform translation=(0 0 0)
      SpatialTransform: axes_held_at_zero=(translation1 translation3)
        TransformAxis rotation1: coordinates=platform_rx axis=(1 0 0) LinearFunction(coefficients=1 0)
        TransformAxis rotation2: coordinates=platform_ry axis=(0 1 0) LinearFunction(coefficients=1 0)
        TransformAxis rotation3: coordinates=platform_rz axis=(0 0 1) LinearFunction(coefficients=1 0)
        TransformAxis translation2: coordinates=platform_ty axis=(0 1 0) LinearFunction(coefficients=1 0)
    CustomJoint ground_pelvis: socket_parent_frame=ground_offset socket_child_frame=pelvis_offset
      Coordinate pelvis_tilt: default_value=-0.2094395 range=(-1.570796 1.570796) clamped=false
      Coordinate pelvis_list: default_value=0 range=(-1.570796 1.570796) clamped=false
      Coordinate pelvis_rotation: default_value=0 range=(-1.570796 1.570796) clamped=false
      Coordinate pelvis_tx: default_value=0.0500027 range=(-1 1) clamped=false
      Coordinate pelvis_ty: default_value=0.92 range=(-1 2) clamped=false
      Coordinate pelvis_tz: default_value=0 range=(-1 1) clamped=false
      PhysicalOffsetFrame ground_offset: socket_parent=/ground translation=(0 0 0)
      PhysicalOffsetFrame pelvis_offset: socket_parent=/bodyset/pelvis translation=(0 0 0)
      SpatialTransform:
        TransformAxis rotation1: coordinates=pelvis_tilt axis=(0 0 1) LinearFunction(coefficients=1 0)
        TransformAxis rotation2: coordinates=pelvis_list axis=(1 0 0) LinearFunction(coefficients=1 0)
        TransformAxis rotation3: coordinates=pelvis_rotation axis=(0 1 0) LinearFunction(coefficients=1 0)
        TransformAxis translation1: coordinates=pelvis_tx axis=(1 0 0) LinearFunction(coefficients=1 0)
        TransformAxis translation2: coordinates=pelvis_ty axis=(0 1 0) LinearFunction(coefficients=1 0)
        TransformAxis translation3: coordinates=pelvis_tz axis=(0 0 1) LinearFunction(coefficients=1 0)
    CustomJoint hip_r: socket_parent_frame=pelvis_offset socket_child_frame=femur_r_offset
      Coordinate hip_flexion_r: default_value=0.3490659 range=(-2.094395 2.094395) clamped=false
      Coordinate hip_adduction_r: default_value=-0.01745329 range=(-2.094395 2.094395) clamped=false
      Coordinate hip_rotation_r: default_value=0.08726646 range=(-2.094395 2.094395) clamped=false
      PhysicalOffsetFrame pelvis_offset: socket_parent=/bodyset/pelvis translation=(-0.0707 -0.0661 0.0835)
      PhysicalOffsetFrame femur_r_offset: socket_parent=/bodyset/femur_r translation=(0 0 0)
      SpatialTransform: axes_held_at_zero=(translation1 translation2 translation3)
        TransformAxis rotation1: coordinates=hip_flexion_r axis=(0 0 1) LinearFunction(coefficients=1 0)
        TransformAxis rotation2: coordinates=hip_adduction_r axis=(1 0 0) LinearFunction(coefficients=1 0)
        TransformAxis rotation3: coordinates=hip_rotation_r axis=(0 1 0) LinearFunction(coefficients=1 0)
    CustomJoint knee_r: socket_parent_frame=femur_r_offset socket_child_frame=tibia_r_offset
      Coordinate knee_angle_r: default_value=-0.3490659 range=(-2.094395 0.1745329) clamped=false
      PhysicalOffsetFrame femur_r_offset: socket_parent=/bodyset/femur_r translation=(0 0 0)
      PhysicalOffsetFrame tibia_r_offset: socket_parent=/bodyset/tibia_r translation=(0 0 0)
      SpatialTransform: axes_held_at_zero=(rotation2 rotation3 translation3)
        TransformAxis rotation1: coordinates=knee_angle_r axis=(0 0 1) LinearFunction(coefficients=1 0)
        TransformAxis translation1: coordinates=knee_angle_r axis=(1 0 0)
          SimmSpline: x=(-2.0944 -1.74533 -1.39626 -1.0472 -0.698132 -0.349066 -0.174533 0.197344 0.337395 0.490178 1.52146 2.0944)
              y=(-0.0032 0.00179 0.00411 0.0041 0.00212 -0.001 -0.0031 -0.005227 -0.005435 -0.005574 -0.005435 -0.00525)
        TransformAxis translation2: coordinates=knee_angle_r axis=(0 1 0)
          SimmSpline: x=(-2.0944 -1.22173 -0.523599 -0.349066 -0.174533 0.159149 2.0944)
              y=(-0.4226 -0.4082 -0.399 -0.3976 -0.3966 -0.395264 -0.396)
    CustomJoint ankle_r: socket_parent_frame=tibia_r_offset socket_child_frame=talus_r_offset
      Coordinate ankle_angle_r: default_value=0.2007129 range=(-1.570796 1.570796) clamped=false
      PhysicalOffsetFrame tibia_r_offset: socket_parent=/bodyset/tibia_r translation=(0 -0.43 0)
      PhysicalOffsetFrame talus_r_offset: socket_parent=/bodyset/talus_r translation=(0 0 0)
      SpatialTransform: axes_held_at_zero=(rotation2 rotation3 translation1 translation2 translation3)
        TransformAxis rotation1: coordinates=ankle_angle_r axis=(-0.1050135 -0.1740224 0.9791263)
            LinearFunction(coefficients=1 0)
    CustomJoint subtalar_r: socket_parent_frame=talus_r_offset socket_child_frame=calcn_r_offset
      Coordinate subtalar_angle_r: default_value=-0.00052361 range=(-1.570796 1.570796) clamped=false
      PhysicalOffsetFrame talus_r_offset: socket_parent=/bodyset/talus_r translation=(-0.04877 -0.04195 0.00792)
      PhysicalOffsetFrame calcn_r_offset: socket_parent=/bodyset/calcn_r translation=(0 0 0)
      SpatialTransform: axes_held_at_zero=(rotation2 rotation3 translation1 translation2 translation3)
        TransformAxis rotation1: coordinates=subtalar_angle_r axis=(0.7871796 0.6047475 -0.1209495)
            LinearFunction(coefficients=1 0)
    CustomJoint mtp_r: socket_parent_frame=calcn_r_offset socket_child_frame=toes_r_offset
      Coordinate mtp_angle_r: default_value=0 range=(-1.570796 1.570796) clamped=false locked=true
      PhysicalOffsetFrame calcn_r_offset: socket_parent=/bodyset/calcn_r translation=(0.1788 -0.002 0.00108)
      PhysicalOffsetFrame toes_r_offset: socket_parent=/bodyset/toes_r translation=(0 0 0)
      SpatialTransform: axes_held_at_zero=(rotation2 rotation3 translation1 translation2 translation3)
        TransformAxis rotation1: coordinates=mtp_angle_r axis=(-0.5809544 0 0.8139361) LinearFunction(coefficients=1 0)
    CustomJoint hip_l: socket_parent_frame=pelvis_offset socket_child_frame=femur_l_offset
      Coordinate hip_flexion_l: default_value=-0.3490659 range=(-2.094395 2.094395) clamped=false locked=true
      Coordinate hip_adduction_l: default_value=0.1745329 range=(-2.094395 2.094395) clamped=false locked=true
      Coordinate hip_rotation_l: default_value=0.08726646 range=(-2.094395 2.094395) clamped=false locked=true
      PhysicalOffsetFrame pelvis_offset: socket_parent=/bodyset/pelvis translation=(-0.0707 -0.0661 -0.0835)
      PhysicalOffsetFrame femur_l_offset: socket_parent=/bodyset/femur_l translation=(0 0 0)
      SpatialTransform: axes_held_at_zero=(translation1 translation2 translation3)
        TransformAxis rotation1: coordinates=hip_flexion_l axis=(0 0 1) LinearFunction(coefficients=1 0)
        TransformAxis rotation2: coordinates=hip_adduction_l axis=(-1 0 0) LinearFunction(coefficients=1 0)
        TransformAxis rotation3: coordinates=hip_rotation_l axis=(0 -1 0) LinearFunction(coefficients=1 0)
    CustomJoint knee_l: socket_parent_frame=femur_l_offset socket_child_frame=tibia_l_offset
      Coordinate knee_angle_l: default_value=-2.094395 range=(-2.094395 0.1745329) clamped=false locked=true
      PhysicalOffsetFrame femur_l_offset: socket_parent=/bodyset/femur_l translation=(0 0 0)
      PhysicalOffsetFrame tibia_l_offset: socket_parent=/bodyset/tibia_l translation=(0 0 0)
      SpatialTransform: axes_held_at_zero=(rotation2 rotation3 translation3)
        TransformAxis rotation1: coordinates=knee_angle_l axis=(0 0 1) LinearFunction(coefficients=1 0)
        TransformAxis translation1: coordinates=knee_angle_l axis=(1 0 0)
          SimmSpline: x=(-2.0944 -1.74533 -1.39626 -1.0472 -0.698132 -0.349066 -0.174533 0.197344 0.337395 0.490178 1.52146 2.0944)
              y=(-0.0032 0.00179 0.00411 0.0041 0.00212 -0.001 -0.0031 -0.005227 -0.005435 -0.005574 -0.005435 -0.00525)
        TransformAxis translation2: coordinates=knee_angle_l axis=(0 1 0)
          SimmSpline: x=(-2.0944 -1.22173 -0.523599 -0.349066 -0.174533 0.159149 2.0944)
              y=(-0.4226 -0.4082 -0.399 -0.3976 -0.3966 -0.395264 -0.396)
    CustomJoint ankle_l: socket_parent_frame=tibia_l_offset socket_child_frame=talus_l_offset
      Coordinate ankle_angle_l: default_value=0.2007129 range=(-1.047198 1.047198) clamped=false locked=true
      PhysicalOffsetFrame tibia_l_offset: socket_parent=/bodyset/tibia_l translation=(0 -0.43 0)
      PhysicalOffsetFrame talus_l_offset: socket_parent=/bodyset/talus_l translation=(0 0 0)
      SpatialTransform: axes_held_at_zero=(rotation2 rotation3 translation1 translation2 translation3)
        TransformAxis rotation1: coordinates=ankle_angle_l axis=(0.1050135 0.1740224 0.9791263)
            LinearFunction(coefficients=1 0)
    CustomJoint subtalar_l: socket_parent_frame=talus_l_offset socket_child_frame=calcn_l_offset
      Coordinate subtalar_angle_l: default_value=-0.00052361 range=(-1.570796 1.570796) clamped=false locked=true
      PhysicalOffsetFrame talus_l_offset: socket_parent=/bodyset/talus_l translation=(-0.04877 -0.04195 -0.00792)
      PhysicalOffsetFrame calcn_l_offset: socket_parent=/bodyset/calcn_l translation=(0 0 0)
      SpatialTransform: axes_held_at_zero=(rotation2 rotation3 translation1 translation2 translation3)
        TransformAxis rotation1: coordinates=subtalar_angle_l axis=(-0.7871796 -0.6047475 -0.1209495)
            LinearFunction(coefficients=1 0)
    CustomJoint mtp_l: socket_parent_frame=calcn_l_offset socket_child_frame=toes_l_offset
      Coordinate mtp_angle_l: default_value=0 range=(-1.047198 1.047198) clamped=false locked=true
      PhysicalOffsetFrame calcn_l_offset: socket_parent=/bodyset/calcn_l translation=(0.1788 -0.002 -0.00108)
      PhysicalOffsetFrame toes_l_offset: socket_parent=/bodyset/toes_l translation=(0 0 0)
      SpatialTransform: axes_held_at_zero=(rotation2 rotation3 translation1 translation2 translation3)
        TransformAxis rotation1: coordinates=mtp_angle_l axis=(0.5809544 0 0.8139361) LinearFunction(coefficients=1 0)
    CustomJoint back: socket_parent_frame=pelvis_offset socket_child_frame=torso_offset
      Coordinate lumbar_extension: default_value=0 range=(-1.570796 1.570796) clamped=false
      Coordinate lumbar_bending: default_value=0 range=(-1.570796 1.570796) clamped=false
      Coordinate lumbar_rotation: default_value=0 range=(-1.570796 1.570796) clamped=false
      PhysicalOffsetFrame pelvis_offset: socket_parent=/bodyset/pelvis translation=(-0.1007 0.0815 0)
      PhysicalOffsetFrame torso_offset: socket_parent=/bodyset/torso translation=(0 0 0)
      SpatialTransform: axes_held_at_zero=(translation1 translation2 translation3)
        TransformAxis rotation1: coordinates=lumbar_extension axis=(0 0 1) LinearFunction(coefficients=1 0)
        TransformAxis rotation2: coordinates=lumbar_bending axis=(1 0 0) LinearFunction(coefficients=1 0)
        TransformAxis rotation3: coordinates=lumbar_rotation axis=(0 1 0) LinearFunction(coefficients=1 0)
  ControllerSet:
    ToyReflexController ToyReflexes: enabled=false
        actuator_list=(glut_med1_r glut_med2_r glut_med3_r bifemlh_r bifemsh_r sar_r add_mag2_r tfl_r pect_r grac_r glut_max1_r glut_max2_r glut_max3_r iliacus_r psoas_r quad_fem_r gem_r peri_r rect_fem_r vas_int_r med_gas_r lat_gas_r soleus_r tib_post_r flex_dig_r flex_hal_r tib_ant_r per_brev_r per_long_r per_tert_r ext_dig_r ext_hal_r glut_med1_l glut_med2_l glut_med3_l bifemlh_l bifemsh_l sar_l add_mag2_l tfl_l pect_l grac_l glut_max1_l glut_max2_l glut_max3_l iliacus_l psoas_l quad_fem_l gem_l peri_l rect_fem_l vas_int_l med_gas_l lat_gas_l soleus_l tib_post_l flex_dig_l flex_hal_l tib_ant_l per_brev_l per_long_l per_tert_l ext_dig_l ext_hal_l ercspn_r ercspn_l intobl_r intobl_l extobl_r extobl_l)
        gain=0.85
    PrescribedController R-invertercontrols: enabled=false
        actuator_list=(ext_hal_r flex_dig_r flex_hal_r tib_ant_r tib_post_r)
      FunctionSet ControlFunctions: ext_hal_r=Constant(value=0.1) flex_dig_r=Constant(value=0.1)
          flex_hal_r=Constant(value=0.1) tib_ant_r=Constant(value=0.1) tib_post_r=Constant(value=0.1)
    PrescribedController R-evertercontrols: enabled=false actuator_list=(ext_dig_r per_brev_r per_long_r per_tert_r)
      FunctionSet ControlFunctions: ext_dig_r=Constant(value=0.3) per_brev_r=Constant(value=0.3)
          per_long_r=Constant(value=0.3) per_tert_r=Constant(value=0.3)
    MuscleReflexController brain: muscleReflexCircuit_list=(glut_med1_r glut_med2_r glut_med3_r bifemlh_r bifemsh_r sar_r add_mag2_r tfl_r pect_r grac_r glut_max1_r glut_max2_r glut_max3_r iliacus_r psoas_r quad_fem_r gem_r peri_r rect_fem_r vas_int_r med_gas_r lat_gas_r soleus_r tib_post_r flex_dig_r flex_hal_r tib_ant_r per_brev_r per_long_r per_tert_r ext_dig_r ext_hal_r glut_med1_l glut_med2_l glut_med3_l bifemlh_l bifemsh_l sar_l add_mag2_l tfl_l pect_l grac_l glut_max1_l glut_max2_l glut_max3_l iliacus_l psoas_l quad_fem_l gem_l peri_l rect_fem_l vas_int_l med_gas_l lat_gas_l soleus_l tib_post_l flex_dig_l flex_hal_l tib_ant_l per_brev_l per_long_l per_tert_l ext_dig_l ext_hal_l ercspn_r ercspn_l intobl_r intobl_l extobl_r extobl_l)
        gain=1
  ForceSet:
    CoordinateActuator active_ankle_brace: coordinate=subtalar_angle_r optimal_force=1
    Thelen2003Muscle [values shared by the 70 below unless stated]: min_control=0.01 optimal_force=1
        max_contraction_velocity=10 FmaxTendonStrain=0.033 FmaxMuscleStrain=0.6 KshapeActive=0.5 KshapePassive=4 Af=0.3
        Flen=1.8 activation_time_constant=0.01 [seconds] deactivation_time_constant=0.04 [seconds]
    Thelen2003Muscle glut_med1_r: max_isometric_force=1119 optimal_fiber_length=0.0535 tendon_slack_length=0.078
        pennation_angle_at_optimal=0.1396263 [radians]
      PathPoint P1: pelvis (-0.0408 0.0304 0.1209)
      PathPoint P2: femur_r (-0.0218 -0.0117 0.0555)
    Thelen2003Muscle glut_med2_r: max_isometric_force=873 optimal_fiber_length=0.0845 tendon_slack_length=0.053
        pennation_angle_at_optimal=0
      PathPoint P1: pelvis (-0.0855 0.0445 0.0766)
      PathPoint P2: femur_r (-0.0258 -0.0058 0.0527)
    Thelen2003Muscle glut_med3_r: max_isometric_force=1000 optimal_fiber_length=0.0646 tendon_slack_length=0.053
        pennation_angle_at_optimal=0.3316126
      PathPoint P1: pelvis (-0.1223 0.0105 0.0648)
      PathPoint P2: femur_r (-0.0309 -0.0047 0.0518)
    Thelen2003Muscle bifemlh_r: max_isometric_force=2700 optimal_fiber_length=0.109 tendon_slack_length=0.326
        pennation_angle_at_optimal=0
      PathPoint P1: pelvis (-0.12596 -0.10257 0.06944)
      PathPoint P2: tibia_r (-0.0301 -0.036 0.02943)
      PathPoint P3: tibia_r (-0.0234 -0.0563 0.0343)
    Thelen2003Muscle bifemsh_r: max_isometric_force=804 optimal_fiber_length=0.173 tendon_slack_length=0.089
        pennation_angle_at_optimal=0.4014257
      PathPoint P1: femur_r (0.005 -0.2111 0.0234)
      PathPoint P2: tibia_r (-0.0301 -0.036 0.02943)
      PathPoint P3: tibia_r (-0.0234 -0.0563 0.0343)
    Thelen2003Muscle sar_r: max_isometric_force=156 optimal_fiber_length=0.52 tendon_slack_length=0.1
        pennation_angle_at_optimal=0
      PathPoint P1: pelvis (-0.0153 -0.0013 0.1242)
      PathPoint P2: femur_r (-0.003 -0.3568 -0.0421)
      PathPoint P3: tibia_r (-0.0056 -0.0419 -0.0399)
      PathPoint P4: tibia_r (0.006 -0.0589 -0.0383)
      PathPoint P5: tibia_r (0.0243 -0.084 -0.0252)
    Thelen2003Muscle add_mag2_r: max_isometric_force=2343 optimal_fiber_length=0.121 tendon_slack_length=0.12
        pennation_angle_at_optimal=0.05235988
      PathPoint P1: pelvis (-0.0831 -0.1192 0.0308)
      PathPoint P2: femur_r (0.0054 -0.2285 0.0227)
    Thelen2003Muscle tfl_r: max_isometric_force=233 optimal_fiber_length=0.095 tendon_slack_length=0.425
        pennation_angle_at_optimal=0.05235988
      PathPoint P1: pelvis (-0.0311 0.0214 0.1241)
      PathPoint P2: femur_r (0.0294 -0.0995 0.0597)
      PathPoint P3: femur_r (0.0054 -0.4049 0.0357)
      PathPoint P4: tibia_r (0.006 -0.0487 0.0297)
    Thelen2003Muscle pect_r: max_isometric_force=266 optimal_fiber_length=0.1 tendon_slack_length=0.033
        pennation_angle_at_optimal=0
      PathPoint P1: pelvis (-0.0431 -0.0768 0.0451)
      PathPoint P2: femur_r (-0.0122 -0.0822 0.0253)
    Thelen2003Muscle grac_r: max_isometric_force=162 optimal_fiber_length=0.352 tendon_slack_length=0.126
        pennation_angle_at_optimal=0.05235988
      PathPoint P1: pelvis (-0.07401 -0.1187 0.02794)
      ConditionalPathPoint P2: tibia_r (-0.02657 -0.0319 -0.03774) socket_coordinate=/jointset/knee_r/knee_angle_r
          range=(-0.436332 0.174533) [radians]
      PathPoint P3: tibia_r (-0.01943 -0.05153 -0.0358)
      PathPoint P4: tibia_r (0.006 -0.0836 -0.0228)
    Thelen2003Muscle glut_max1_r: max_isometric_force=573 optimal_fiber_length=0.142 tendon_slack_length=0.125
        pennation_angle_at_optimal=0.08726646
      PathPoint P1: pelvis (-0.1195 0.0612 0.07)
      PathPoint P2: pelvis (-0.1291 0.0012 0.0886)
      PathPoint P3: femur_r (-0.0457 -0.0248 0.0392)
      PathPoint P4: femur_r (-0.0277 -0.0566 0.047)
    Thelen2003Muscle glut_max2_r: max_isometric_force=819 optimal_fiber_length=0.147 tendon_slack_length=0.127
        pennation_angle_at_optimal=0
      PathPoint P1: pelvis (-0.1349 0.0176 0.0563)
      PathPoint P2: pelvis (-0.1376 -0.052 0.0914)
      PathPoint P3: femur_r (-0.0426 -0.053 0.0293)
      PathPoint P4: femur_r (-0.0156 -0.1016 0.0419)
    Thelen2003Muscle glut_max3_r: max_isometric_force=552 optimal_fiber_length=0.144 tendon_slack_length=0.145
        pennation_angle_at_optimal=0.08726646
      PathPoint P1: pelvis (-0.1556 -0.0314 0.0058)
      PathPoint P2: pelvis (-0.1529 -0.1052 0.0403)
      PathPoint P3: femur_r (-0.0299 -0.1041 0.0135)
      PathPoint P4: femur_r (-0.006 -0.1419 0.0411)
    Thelen2003Muscle iliacus_r: max_isometric_force=1073 optimal_fiber_length=0.1 tendon_slack_length=0.1
        pennation_angle_at_optimal=0.1221731
      PathPoint P1: pelvis (-0.0674 0.0365 0.0854)
      PathPoint P2: pelvis (-0.0258 -0.055 0.0811)
      ConditionalPathPoint P3: pelvis (-0.0288 -0.0805 0.0816) socket_coordinate=/jointset/hip_r/hip_flexion_r
          range=(-1.5708 0.785398)
      PathPoint P4: femur_r (0.0017 -0.0543 0.0057)
      PathPoint P5: femur_r (-0.0193 -0.0621 0.0129)
    Thelen2003Muscle psoas_r: max_isometric_force=1113 optimal_fiber_length=0.1 tendon_slack_length=0.16
        pennation_angle_at_optimal=0.1396263
      PathPoint P1: pelvis (-0.0647 0.0887 0.0289)
      PathPoint P2: pelvis (-0.0238 -0.057 0.0759)
      ConditionalPathPoint P3: pelvis (-0.0288 -0.0805 0.0816) socket_coordinate=/jointset/hip_r/hip_flexion_r
          range=(-1.5708 0.785398)
      PathPoint P4: femur_r (0.0016 -0.0507 0.0038)
      PathPoint P5: femur_r (-0.0188 -0.0597 0.0104)
    Thelen2003Muscle quad_fem_r: max_isometric_force=381 optimal_fiber_length=0.054 tendon_slack_length=0.024
        pennation_angle_at_optimal=0
      PathPoint P1: pelvis (-0.1143 -0.1151 0.052)
      PathPoint P2: femur_r (-0.0381 -0.0359 0.0366)
    Thelen2003Muscle gem_r: max_isometric_force=164 optimal_fiber_length=0.024 tendon_slack_length=0.039
        pennation_angle_at_optimal=0
      PathPoint P1: pelvis (-0.1133 -0.082 0.0714)
      PathPoint P2: femur_r (-0.0142 -0.0033 0.0443)
    Thelen2003Muscle peri_r: max_isometric_force=444 optimal_fiber_length=0.026 tendon_slack_length=0.115
        pennation_angle_at_optimal=0.1745329
      PathPoint P1: pelvis (-0.1396 0.0003 0.0235)
      PathPoint P2: pelvis (-0.1193 -0.0276 0.0657)
      PathPoint P3: femur_r (-0.0148 -0.0036 0.0437)
    Thelen2003Muscle rect_fem_r: max_isometric_force=1169 optimal_fiber_length=0.114 tendon_slack_length=0.31
        pennation_angle_at_optimal=0.08726646
      PathPoint P1: pelvis (-0.0295 -0.0311 0.0968)
      ConditionalPathPoint P2: femur_r (0.0334 -0.403 0.0019) socket_coordinate=/jointset/knee_r/knee_angle_r
          range=(-2.61799 -1.45997)
      MovingPathPoint P3: tibia_r socket_x_coordinate=/jointset/knee_r/knee_angle_r
          socket_y_coordinate=/jointset/knee_r/knee_angle_r socket_z_coordinate=/jointset/knee_r/knee_angle_r
        x_location: SimmSpline: x=(-2.0944 -1.99997 -1.5708 -1.45752 -1.39626 -1.0472 -0.698132 -0.526391 -0.349066 -0.174533 0 0.00017453 0.00034907 0.0279253 0.0872665 0.174533 2.0944)
            y=(0.0155805 0.0179938 0.0275081 0.0296564 0.0307615 0.0365695 0.0422074 0.0450902 0.048391 0.0534299 0.0617576 0.0617669 0.0617762 0.0633083 0.066994 0.0733035 0.0573481)
        y_location: SimmSpline: x=(-2.0944 -1.99997 -1.5708 -1.45752 -1.39626 -1.0472 -0.698132 -0.526391 -0.349066 -0.174533 0 0.00017453 0.00034907 0.0279253 0.0872665 0.174533 2.0944)
            y=(0.0234116 0.0237613 0.0251141 0.0252795 0.0253146 0.0249184 0.0242373 0.0238447 0.0234197 0.0227644 0.020984 0.0209814 0.0209788 0.0205225 0.0191754 0.0159554 -0.0673774)
        z_location: SimmSpline: x=(-2.0944 0.1745) y=(0.0014 0.0014)
    Thelen2003Muscle vas_int_r: max_isometric_force=5000 optimal_fiber_length=0.107 tendon_slack_length=0.116
        pennation_angle_at_optimal=0.05235988
      PathPoint P1: femur_r (0.029 -0.1924 0.031)
      PathPoint P2: femur_r (0.0335 -0.2084 0.0285)
      ConditionalPathPoint P3: femur_r (0.0343 -0.403 0.0055) socket_coordinate=/jointset/knee_r/knee_angle_r
          range=(-2.61799 -1.42)
      MovingPathPoint P4: tibia_r socket_x_coordinate=/jointset/knee_r/knee_angle_r
          socket_y_coordinate=/jointset/knee_r/knee_angle_r socket_z_coordinate=/jointset/knee_r/knee_angle_r
        x_location: SimmSpline: x=(-2.0944 -1.99997 -1.5708 -1.45752 -1.39626 -1.0472 -0.698132 -0.526391 -0.349066 -0.174533 0 0.00017453 0.00034907 0.0279253 0.0872665 0.174533 2.0944)
            y=(0.0082733 0.0106866 0.0202042 0.022353 0.0234583 0.0292715 0.0349465 0.037871 0.0412569 0.0465287 0.0554632 0.0554735 0.0554837 0.0571717 0.061272 0.0684368 0.0648818)
        y_location: SimmSpline: x=(-2.0944 -1.99997 -1.5708 -1.45752 -1.39626 -1.0472 -0.698132 -0.526391 -0.349066 -0.174533 0 0.00017453 0.00034907 0.0279253 0.0872665 0.174533 2.0944)
            y=(0.025599 0.0259487 0.0273124 0.0274796 0.0275151 0.0271363 0.0265737 0.0263073 0.0261187 0.0260129 0.0252923 0.0252911 0.0252898 0.0250526 0.0242191 0.0218288 -0.0685706)
        z_location: SimmSpline: x=(-2.0944 2.0944) y=(0.0018 0.0018)
    Thelen2003Muscle med_gas_r: max_isometric_force=2500 optimal_fiber_length=0.09 tendon_slack_length=0.36
        pennation_angle_at_optimal=0.296706
      PathPoint P1: femur_r (-0.019 -0.3929 -0.0235)
      ConditionalPathPoint P2: femur_r (-0.03 -0.4022 -0.0258) socket_coordinate=/jointset/knee_r/knee_angle_r
          range=(-0.785398 0.174533)
      PathPoint P3: calcn_r (0 0.031 -0.0053)
    Thelen2003Muscle lat_gas_r: max_isometric_force=683 optimal_fiber_length=0.064 tendon_slack_length=0.38
        pennation_angle_at_optimal=0.1396263 default_activation=0.05 default_fiber_length=0.1
      PathPoint P1: femur_r (-0.022 -0.3946 0.0272)
      ConditionalPathPoint P2: femur_r (-0.03 -0.4018 0.0274) socket_coordinate=/jointset/knee_r/knee_angle_r
          range=(-0.785398 0.174533)
      PathPoint P3: calcn_r (0 0.031 -0.0053)
    Thelen2003Muscle soleus_r: max_isometric_force=4000 optimal_fiber_length=0.08 tendon_slack_length=0.22
        pennation_angle_at_optimal=0.4363323
      PathPoint P1: tibia_r (-0.0024 -0.1533 0.0071)
      PathPoint P2: calcn_r (0 0.031 -0.0053)
    Thelen2003Muscle tib_post_r: max_isometric_force=3600 optimal_fiber_length=0.031 tendon_slack_length=0.31
        pennation_angle_at_optimal=0.2094395
      PathPoint P1: tibia_r (-0.0094 -0.1348 0.0019)
      PathPoint P2: tibia_r (-0.0144 -0.4051 -0.0229)
      PathPoint P3: calcn_r (0.0417 0.0334 -0.0286)
      PathPoint P4: calcn_r (0.0772 0.0159 -0.0281)
    Thelen2003Muscle flex_dig_r: max_isometric_force=310 optimal_fiber_length=0.034 tendon_slack_length=0.4
        pennation_angle_at_optimal=0.1221731 default_activation=0.05 default_fiber_length=0.1
      PathPoint P1: tibia_r (-0.0083 -0.2046 -0.0018)
      PathPoint P2: tibia_r (-0.0154 -0.4051 -0.0196)
      PathPoint P3: calcn_r (0.0436 0.0315 -0.028)
      PathPoint P4: calcn_r (0.0708 0.0176 -0.0263)
      PathPoint P5: calcn_r (0.1658 -0.0081 0.0116)
      PathPoint P6: toes_r (-0.0019 -0.0078 0.0147)
      PathPoint P7: toes_r (0.0285 -0.0071 0.0215)
      PathPoint P8: toes_r (0.0441 -0.006 0.0242)
    Thelen2003Muscle flex_hal_r: max_isometric_force=322 optimal_fiber_length=0.043 tendon_slack_length=0.38
        pennation_angle_at_optimal=0.1745329 default_activation=0.05 default_fiber_length=0.1
      PathPoint P1: tibia_r (-0.0079 -0.2334 0.0244)
      PathPoint P2: tibia_r (-0.0186 -0.4079 -0.0174)
      PathPoint P3: calcn_r (0.0374 0.0276 -0.0241)
      PathPoint P4: calcn_r (0.1038 0.0068 -0.0256)
      PathPoint P5: calcn_r (0.1726 -0.0053 -0.0269)
      PathPoint P6: toes_r (0.0155 -0.0064 -0.0265)
      PathPoint P7: toes_r (0.0562 -0.0102 -0.0181)
    Thelen2003Muscle tib_ant_r: max_isometric_force=3000 optimal_fiber_length=0.098 tendon_slack_length=0.223
        pennation_angle_at_optimal=0.08726646
      PathPoint P1: tibia_r (0.0179 -0.1624 0.0115)
      PathPoint P2: tibia_r (0.0329 -0.3951 -0.0177)
      PathPoint P3: calcn_r (0.1166 0.0178 -0.0305)
    Thelen2003Muscle per_brev_r: max_isometric_force=435 optimal_fiber_length=0.05 tendon_slack_length=0.161
        pennation_angle_at_optimal=0.08726646 default_activation=0.05 default_fiber_length=0.1
      PathPoint P1: tibia_r (-0.007 -0.2646 0.0325)
      PathPoint P2: tibia_r (-0.0198 -0.4184 0.0283)
      PathPoint P3: tibia_r (-0.0144 -0.4295 0.0289)
      PathPoint P4: calcn_r (0.0471 0.027 0.0233)
      PathPoint P5: calcn_r (0.0677 0.0219 0.0343)
    Thelen2003Muscle per_long_r: max_isometric_force=943 optimal_fiber_length=0.049 tendon_slack_length=0.345
        pennation_angle_at_optimal=0.1745329 default_activation=0.05 default_fiber_length=0.1
      PathPoint P1: tibia_r (0.0005 -0.1568 0.0362)
      PathPoint P2: tibia_r (-0.0207 -0.4205 0.0286)
      PathPoint P3: tibia_r (-0.0162 -0.4319 0.0289)
      PathPoint P4: calcn_r (0.0438 0.023 0.0221)
      PathPoint P5: calcn_r (0.0681 0.0106 0.0284)
      PathPoint P6: calcn_r (0.0852 0.0069 0.0118)
      PathPoint P7: calcn_r (0.1203 0.0085 -0.0184)
    Thelen2003Muscle per_tert_r: max_isometric_force=180 optimal_fiber_length=0.079 tendon_slack_length=0.1
        pennation_angle_at_optimal=0.2268928 default_activation=0.05 default_fiber_length=0.1
      PathPoint P1: tibia_r (0.001 -0.2804 0.0231)
      PathPoint P2: tibia_r (0.0229 -0.4069 0.0159)
      PathPoint P3: calcn_r (0.0857 0.0228 0.0299)
    Thelen2003Muscle ext_dig_r: max_isometric_force=512 optimal_fiber_length=0.102 tendon_slack_length=0.345
        pennation_angle_at_optimal=0.1396263 default_activation=0.05 default_fiber_length=0.1
      PathPoint P1: tibia_r (0.0032 -0.1381 0.0276)
      PathPoint P2: tibia_r (0.0289 -0.4007 0.0072)
      PathPoint P3: calcn_r (0.0922 0.0388 -0.0001)
      PathPoint P4: calcn_r (0.1616 0.0055 0.013)
      PathPoint P5: toes_r (0.0003 0.0047 0.0153)
      PathPoint P6: toes_r (0.0443 -0.0004 0.025)
    Thelen2003Muscle ext_hal_r: max_isometric_force=162 optimal_fiber_length=0.111 tendon_slack_length=0.305
        pennation_angle_at_optimal=0.1047198 default_activation=0.05 default_fiber_length=0.1
      PathPoint P1: tibia_r (0.0012 -0.1767 0.0228)
      PathPoint P2: tibia_r (0.0326 -0.3985 -0.0085)
      PathPoint P3: calcn_r (0.097 0.0389 -0.0211)
      PathPoint P4: calcn_r (0.1293 0.0309 -0.0257)
      PathPoint P5: calcn_r (0.1734 0.0139 -0.028)
      PathPoint P6: toes_r (0.0298 0.0041 -0.0245)
      PathPoint P7: toes_r (0.0563 0.0034 -0.0186)
    Thelen2003Muscle glut_med1_l: max_isometric_force=1119 optimal_fiber_length=0.0535 tendon_slack_length=0.078
        pennation_angle_at_optimal=0.1396263
      PathPoint P1: pelvis (-0.0408 0.0304 -0.1209)
      PathPoint P2: femur_l (-0.0218 -0.0117 -0.0555)
    Thelen2003Muscle glut_med2_l: max_isometric_force=873 optimal_fiber_length=0.0845 tendon_slack_length=0.053
        pennation_angle_at_optimal=0
      PathPoint P1: pelvis (-0.0855 0.0445 -0.0766)
      PathPoint P2: femur_l (-0.0258 -0.0058 -0.0527)
    Thelen2003Muscle glut_med3_l: max_isometric_force=1000 optimal_fiber_length=0.0646 tendon_slack_length=0.053
        pennation_angle_at_optimal=0.3316126
      PathPoint P1: pelvis (-0.1223 0.0105 -0.0648)
      PathPoint P2: femur_l (-0.0309 -0.0047 -0.0518)
    Thelen2003Muscle bifemlh_l: max_isometric_force=2700 optimal_fiber_length=0.109 tendon_slack_length=0.326
        pennation_angle_at_optimal=0
      PathPoint P1: pelvis (-0.12596 -0.10257 -0.06944)
      PathPoint P2: tibia_l (-0.0301 -0.036 -0.02943)
      PathPoint P3: tibia_l (-0.0234 -0.0563 -0.0343)
    Thelen2003Muscle bifemsh_l: max_isometric_force=804 optimal_fiber_length=0.173 tendon_slack_length=0.089
        pennation_angle_at_optimal=0.4014257
      PathPoint P1: femur_l (0.005 -0.2111 -0.0234)
      PathPoint P2: tibia_l (-0.0301 -0.036 -0.02943)
      PathPoint P3: tibia_l (-0.0234 -0.0563 -0.0343)
    Thelen2003Muscle sar_l: max_isometric_force=156 optimal_fiber_length=0.52 tendon_slack_length=0.1
        pennation_angle_at_optimal=0
      PathPoint P1: pelvis (-0.0153 -0.0013 -0.1242)
      PathPoint P2: femur_l (-0.003 -0.3568 0.0421)
      PathPoint P3: tibia_l (-0.0056 -0.0419 0.0399)
      PathPoint P4: tibia_l (0.006 -0.0589 0.0383)
      PathPoint P5: tibia_l (0.0243 -0.084 0.0252)
    Thelen2003Muscle add_mag2_l: max_isometric_force=2343 optimal_fiber_length=0.121 tendon_slack_length=0.12
        pennation_angle_at_optimal=0.05235988
      PathPoint P1: pelvis (-0.0831 -0.1192 -0.0308)
      PathPoint P2: femur_l (0.0054 -0.2285 -0.0227)
    Thelen2003Muscle tfl_l: max_isometric_force=233 optimal_fiber_length=0.095 tendon_slack_length=0.425
        pennation_angle_at_optimal=0.05235988
      PathPoint P1: pelvis (-0.0311 0.0214 -0.1241)
      PathPoint P2: femur_l (0.0294 -0.0995 -0.0597)
      PathPoint P3: femur_l (0.0054 -0.4049 -0.0357)
      PathPoint P4: tibia_l (0.006 -0.0487 -0.0297)
    Thelen2003Muscle pect_l: max_isometric_force=266 optimal_fiber_length=0.1 tendon_slack_length=0.033
        pennation_angle_at_optimal=0
      PathPoint P1: pelvis (-0.0431 -0.0768 -0.0451)
      PathPoint P2: femur_l (-0.0122 -0.0822 -0.0253)
    Thelen2003Muscle grac_l: max_isometric_force=162 optimal_fiber_length=0.352 tendon_slack_length=0.126
        pennation_angle_at_optimal=0.05235988
      PathPoint P1: pelvis (-0.07401 -0.1187 -0.02794)
      ConditionalPathPoint P2: tibia_l (-0.02657 -0.0319 0.03774) socket_coordinate=/jointset/knee_l/knee_angle_l
          range=(-0.436332 0.174533)
      PathPoint P3: tibia_l (-0.01943 -0.05153 0.0358)
      PathPoint P4: tibia_l (0.006 -0.0836 0.0228)
    Thelen2003Muscle glut_max1_l: max_isometric_force=573 optimal_fiber_length=0.142 tendon_slack_length=0.125
        pennation_angle_at_optimal=0.08726646
      PathPoint P1: pelvis (-0.1195 0.0612 -0.07)
      PathPoint P2: pelvis (-0.1291 0.0012 -0.0886)
      PathPoint P3: femur_l (-0.0457 -0.0248 -0.0392)
      PathPoint P4: femur_l (-0.0277 -0.0566 -0.047)
    Thelen2003Muscle glut_max2_l: max_isometric_force=819 optimal_fiber_length=0.147 tendon_slack_length=0.127
        pennation_angle_at_optimal=0
      PathPoint P1: pelvis (-0.1349 0.0176 -0.0563)
      PathPoint P2: pelvis (-0.1376 -0.052 -0.0914)
      PathPoint P3: femur_l (-0.0426 -0.053 -0.0293)
      PathPoint P4: femur_l (-0.0156 -0.1016 -0.0419)
    Thelen2003Muscle glut_max3_l: max_isometric_force=552 optimal_fiber_length=0.144 tendon_slack_length=0.145
        pennation_angle_at_optimal=0.08726646
      PathPoint P1: pelvis (-0.1556 -0.0314 -0.0058)
      PathPoint P2: pelvis (-0.1529 -0.1052 -0.0403)
      PathPoint P3: femur_l (-0.0299 -0.1041 -0.0135)
      PathPoint P4: femur_l (-0.006 -0.1419 -0.0411)
    Thelen2003Muscle iliacus_l: max_isometric_force=1073 optimal_fiber_length=0.1 tendon_slack_length=0.1
        pennation_angle_at_optimal=0.1221731
      PathPoint P1: pelvis (-0.0674 0.0365 -0.0854)
      PathPoint P2: pelvis (-0.0258 -0.055 -0.0811)
      ConditionalPathPoint P3: pelvis (-0.0288 -0.0805 -0.0816) socket_coordinate=/jointset/hip_l/hip_flexion_l
          range=(-1.5708 0.785398)
      PathPoint P4: femur_l (0.0017 -0.0543 -0.0057)
      PathPoint P5: femur_l (-0.0193 -0.0621 -0.0129)
    Thelen2003Muscle psoas_l: max_isometric_force=1113 optimal_fiber_length=0.1 tendon_slack_length=0.16
        pennation_angle_at_optimal=0.1396263
      PathPoint P1: pelvis (-0.0647 0.0887 -0.0289)
      PathPoint P2: pelvis (-0.0238 -0.057 -0.0759)
      ConditionalPathPoint P3: pelvis (-0.0288 -0.0805 -0.0816) socket_coordinate=/jointset/hip_l/hip_flexion_l
          range=(-1.5708 0.785398)
      PathPoint P4: femur_l (0.0016 -0.0507 -0.0038)
      PathPoint P5: femur_l (-0.0188 -0.0597 -0.0104)
    Thelen2003Muscle quad_fem_l: max_isometric_force=381 optimal_fiber_length=0.054 tendon_slack_length=0.024
        pennation_angle_at_optimal=0
      PathPoint P1: pelvis (-0.1143 -0.1151 -0.052)
      PathPoint P2: femur_l (-0.0381 -0.0359 -0.0366)
    Thelen2003Muscle gem_l: max_isometric_force=164 optimal_fiber_length=0.024 tendon_slack_length=0.039
        pennation_angle_at_optimal=0
      PathPoint P1: pelvis (-0.1133 -0.082 -0.0714)
      PathPoint P2: femur_l (-0.0142 -0.0033 -0.0443)
    Thelen2003Muscle peri_l: max_isometric_force=444 optimal_fiber_length=0.026 tendon_slack_length=0.115
        pennation_angle_at_optimal=0.1745329
      PathPoint P1: pelvis (-0.1396 0.0003 -0.0235)
      PathPoint P2: pelvis (-0.1193 -0.0276 -0.0657)
      PathPoint P3: femur_l (-0.0148 -0.0036 -0.0437)
    Thelen2003Muscle rect_fem_l: max_isometric_force=1169 optimal_fiber_length=0.114 tendon_slack_length=0.31
        pennation_angle_at_optimal=0.08726646
      PathPoint P1: pelvis (-0.0295 -0.0311 -0.0968)
      ConditionalPathPoint P2: femur_l (0.0334 -0.403 -0.0019) socket_coordinate=/jointset/knee_l/knee_angle_l
          range=(-2.61799 -1.45997)
      MovingPathPoint P3: tibia_l socket_x_coordinate=/jointset/knee_l/knee_angle_l
          socket_y_coordinate=/jointset/knee_l/knee_angle_l socket_z_coordinate=/jointset/knee_l/knee_angle_l
        x_location: SimmSpline: x=(-2.0944 -1.99997 -1.5708 -1.45752 -1.39626 -1.0472 -0.698132 -0.526391 -0.349066 -0.174533 0 0.00017453 0.00034907 0.0279253 0.0872665 0.174533 2.0944)
            y=(0.0155805 0.0179938 0.0275081 0.0296564 0.0307615 0.0365695 0.0422074 0.0450902 0.048391 0.0534299 0.0617576 0.0617669 0.0617762 0.0633083 0.066994 0.0733035 0.0573481)
        y_location: SimmSpline: x=(-2.0944 -1.99997 -1.5708 -1.45752 -1.39626 -1.0472 -0.698132 -0.526391 -0.349066 -0.174533 0 0.00017453 0.00034907 0.0279253 0.0872665 0.174533 2.0944)
            y=(0.0234116 0.0237613 0.0251141 0.0252795 0.0253146 0.0249184 0.0242373 0.0238447 0.0234197 0.0227644 0.020984 0.0209814 0.0209788 0.0205225 0.0191754 0.0159554 -0.0673774)
        z_location: SimmSpline: x=(-2.0944 0.1745) y=(-0.0014 -0.0014)
    Thelen2003Muscle vas_int_l: max_isometric_force=5000 optimal_fiber_length=0.107 tendon_slack_length=0.116
        pennation_angle_at_optimal=0.05235988
      PathPoint P1: femur_l (0.029 -0.1924 -0.031)
      PathPoint P2: femur_l (0.0335 -0.2084 -0.0285)
      ConditionalPathPoint P3: femur_l (0.0343 -0.403 -0.0055) socket_coordinate=/jointset/knee_l/knee_angle_l
          range=(-2.61799 -1.42)
      MovingPathPoint P4: tibia_l socket_x_coordinate=/jointset/knee_l/knee_angle_l
          socket_y_coordinate=/jointset/knee_l/knee_angle_l socket_z_coordinate=/jointset/knee_l/knee_angle_l
        x_location: SimmSpline: x=(-2.0944 -1.99997 -1.5708 -1.45752 -1.39626 -1.0472 -0.698132 -0.526391 -0.349066 -0.174533 0 0.00017453 0.00034907 0.0279253 0.0872665 0.174533 2.0944)
            y=(0.0082733 0.0106866 0.0202042 0.022353 0.0234583 0.0292715 0.0349465 0.037871 0.0412569 0.0465287 0.0554632 0.0554735 0.0554837 0.0571717 0.061272 0.0684368 0.0648818)
        y_location: SimmSpline: x=(-2.0944 -1.99997 -1.5708 -1.45752 -1.39626 -1.0472 -0.698132 -0.526391 -0.349066 -0.174533 0 0.00017453 0.00034907 0.0279253 0.0872665 0.174533 2.0944)
            y=(0.025599 0.0259487 0.0273124 0.0274796 0.0275151 0.0271363 0.0265737 0.0263073 0.0261187 0.0260129 0.0252923 0.0252911 0.0252898 0.0250526 0.0242191 0.0218288 -0.0685706)
        z_location: SimmSpline: x=(-2.0944 2.0944) y=(-0.0018 -0.0018)
    Thelen2003Muscle med_gas_l: max_isometric_force=2500 optimal_fiber_length=0.09 tendon_slack_length=0.36
        pennation_angle_at_optimal=0.296706
      PathPoint P1: femur_l (-0.019 -0.3929 0.0235)
      ConditionalPathPoint P2: femur_l (-0.03 -0.4022 0.0258) socket_coordinate=/jointset/knee_l/knee_angle_l
          range=(-0.785398 0.174533)
      PathPoint P3: calcn_l (0 0.031 0.0053)
    Thelen2003Muscle lat_gas_l: max_isometric_force=683 optimal_fiber_length=0.064 tendon_slack_length=0.38
        pennation_angle_at_optimal=0.1396263 default_activation=0.05 default_fiber_length=0.1
      PathPoint P1: femur_l (-0.022 -0.3946 -0.0272)
      ConditionalPathPoint P2: femur_l (-0.03 -0.4018 -0.0274) socket_coordinate=/jointset/knee_l/knee_angle_l
          range=(-0.785398 0.174533)
      PathPoint P3: calcn_l (0 0.031 0.0053)
    Thelen2003Muscle soleus_l: max_isometric_force=4000 optimal_fiber_length=0.08 tendon_slack_length=0.22
        pennation_angle_at_optimal=0.4363323
      PathPoint P1: tibia_l (-0.0024 -0.1533 -0.0071)
      PathPoint P2: calcn_l (0 0.031 0.0053)
    Thelen2003Muscle tib_post_l: max_isometric_force=3600 optimal_fiber_length=0.031 tendon_slack_length=0.31
        pennation_angle_at_optimal=0.2094395
      PathPoint P1: tibia_l (-0.0094 -0.1348 -0.0019)
      PathPoint P2: tibia_l (-0.0144 -0.4051 0.0229)
      PathPoint P3: calcn_l (0.0417 0.0334 0.0286)
      PathPoint P4: calcn_l (0.0772 0.0159 0.0281)
    Thelen2003Muscle flex_dig_l: max_isometric_force=310 optimal_fiber_length=0.034 tendon_slack_length=0.4
        pennation_angle_at_optimal=0.1221731 default_activation=0.05 default_fiber_length=0.1
      PathPoint P1: tibia_l (-0.0083 -0.2046 0.0018)
      PathPoint P2: tibia_l (-0.0154 -0.4051 0.0196)
      PathPoint P3: calcn_l (0.0436 0.0315 0.028)
      PathPoint P4: calcn_l (0.0708 0.0176 0.0263)
      PathPoint P5: calcn_l (0.1658 -0.0081 -0.0116)
      PathPoint P6: toes_l (-0.0019 -0.0078 -0.0147)
      PathPoint P7: toes_l (0.0285 -0.0071 -0.0215)
      PathPoint P8: toes_l (0.0441 -0.006 -0.0242)
    Thelen2003Muscle flex_hal_l: max_isometric_force=322 optimal_fiber_length=0.043 tendon_slack_length=0.38
        pennation_angle_at_optimal=0.1745329 default_activation=0.05 default_fiber_length=0.1
      PathPoint P1: tibia_l (-0.0079 -0.2334 -0.0244)
      PathPoint P2: tibia_l (-0.0186 -0.4079 0.0174)
      PathPoint P3: calcn_l (0.0374 0.0276 0.0241)
      PathPoint P4: calcn_l (0.1038 0.0068 0.0256)
      PathPoint P5: calcn_l (0.1726 -0.0053 0.0269)
      PathPoint P6: toes_l (0.0155 -0.0064 0.0265)
      PathPoint P7: toes_l (0.0562 -0.0102 0.0181)
    Thelen2003Muscle tib_ant_l: max_isometric_force=3000 optimal_fiber_length=0.098 tendon_slack_length=0.223
        pennation_angle_at_optimal=0.08726646
      PathPoint P1: tibia_l (0.0179 -0.1624 -0.0115)
      PathPoint P2: tibia_l (0.0329 -0.3951 0.0177)
      PathPoint P3: calcn_l (0.1166 0.0178 0.0305)
    Thelen2003Muscle per_brev_l: max_isometric_force=435 optimal_fiber_length=0.05 tendon_slack_length=0.161
        pennation_angle_at_optimal=0.08726646 default_activation=0.05 default_fiber_length=0.1
      PathPoint P1: tibia_l (-0.007 -0.2646 -0.0325)
      PathPoint P2: tibia_l (-0.0198 -0.4184 -0.0283)
      PathPoint P3: tibia_l (-0.0144 -0.4295 -0.0289)
      PathPoint P4: calcn_l (0.0471 0.027 -0.0233)
      PathPoint P5: calcn_l (0.0677 0.0219 -0.0343)
    Thelen2003Muscle per_long_l: max_isometric_force=943 optimal_fiber_length=0.049 tendon_slack_length=0.345
        pennation_angle_at_optimal=0.1745329 default_activation=0.05 default_fiber_length=0.1
      PathPoint P1: tibia_l (0.0005 -0.1568 -0.0362)
      PathPoint P2: tibia_l (-0.0207 -0.4205 -0.0286)
      PathPoint P3: tibia_l (-0.0162 -0.4319 -0.0289)
      PathPoint P4: calcn_l (0.0438 0.023 -0.0221)
      PathPoint P5: calcn_l (0.0681 0.0106 -0.0284)
      PathPoint P6: calcn_l (0.0852 0.0069 -0.0118)
      PathPoint P7: calcn_l (0.1203 0.0085 0.0184)
    Thelen2003Muscle per_tert_l: max_isometric_force=180 optimal_fiber_length=0.079 tendon_slack_length=0.1
        pennation_angle_at_optimal=0.2268928 default_activation=0.05 default_fiber_length=0.1
      PathPoint P1: tibia_l (0.001 -0.2804 -0.0231)
      PathPoint P2: tibia_l (0.0229 -0.4069 -0.0159)
      PathPoint P3: calcn_l (0.0857 0.0228 -0.0299)
    Thelen2003Muscle ext_dig_l: max_isometric_force=512 optimal_fiber_length=0.102 tendon_slack_length=0.345
        pennation_angle_at_optimal=0.1396263 default_activation=0.05 default_fiber_length=0.1
      PathPoint P1: tibia_l (0.0032 -0.1381 -0.0276)
      PathPoint P2: tibia_l (0.0289 -0.4007 -0.0072)
      PathPoint P3: calcn_l (0.0922 0.0388 0.0001)
      PathPoint P4: calcn_l (0.1616 0.0055 -0.013)
      PathPoint P5: toes_l (0.0003 0.0047 -0.0153)
      PathPoint P6: toes_l (0.0443 -0.0004 -0.025)
    Thelen2003Muscle ext_hal_l: max_isometric_force=162 optimal_fiber_length=0.111 tendon_slack_length=0.305
        pennation_angle_at_optimal=0.1047198 default_activation=0.05 default_fiber_length=0.1
      PathPoint P1: tibia_l (0.0012 -0.1767 -0.0228)
      PathPoint P2: tibia_l (0.0326 -0.3985 0.0085)
      PathPoint P3: calcn_l (0.097 0.0389 0.0211)
      PathPoint P4: calcn_l (0.1293 0.0309 0.0257)
      PathPoint P5: calcn_l (0.1734 0.0139 0.028)
      PathPoint P6: toes_l (0.0298 0.0041 0.0245)
      PathPoint P7: toes_l (0.0563 0.0034 0.0186)
    Thelen2003Muscle ercspn_r: max_isometric_force=2500 optimal_fiber_length=0.12 tendon_slack_length=0.03
        pennation_angle_at_optimal=0
      PathPoint P1: pelvis (-0.14 0.0439 0.0436)
      PathPoint P2: torso (-0.055 0.11 0.0241)
    Thelen2003Muscle ercspn_l: max_isometric_force=2500 optimal_fiber_length=0.12 tendon_slack_length=0.03
        pennation_angle_at_optimal=0
      PathPoint P1: pelvis (-0.14 0.0439 -0.0436)
      PathPoint P2: torso (-0.055 0.11 -0.0241)
    Thelen2003Muscle intobl_r: max_isometric_force=900 optimal_fiber_length=0.1 tendon_slack_length=0.1
        pennation_angle_at_optimal=0
      PathPoint P1: pelvis (-0.04 0.07 0.1157)
      PathPoint P2: torso (0.07 0.16 0.015)
    Thelen2003Muscle intobl_l: max_isometric_force=900 optimal_fiber_length=0.1 tendon_slack_length=0.1
        pennation_angle_at_optimal=0
      PathPoint P1: pelvis (-0.04 0.07 -0.1157)
      PathPoint P2: torso (0.07 0.16 -0.015)
    Thelen2003Muscle extobl_r: max_isometric_force=900 optimal_fiber_length=0.12 tendon_slack_length=0.14
        pennation_angle_at_optimal=0
      PathPoint P1: pelvis (-0.03 -0.0636 0.01)
      PathPoint P2: torso (0.065 0.11 0.11)
    Thelen2003Muscle extobl_l: max_isometric_force=900 optimal_fiber_length=0.12 tendon_slack_length=0.14
        pennation_angle_at_optimal=0
      PathPoint P1: pelvis (-0.03 -0.0636 -0.01)
      PathPoint P2: torso (0.065 0.11 -0.11)
    HuntCrossleyForce foot_r: transition_velocity=0.1
      ContactParametersSet contact_parameters:
        ContactParameters: geometry=(platform heel_r ball_big_toe_r small_toe_r) stiffness=100000000 dissipation=0.5
            static_friction=0.9 dynamic_friction=0.9 viscous_friction=0.6
    HuntCrossleyForce foot_l: transition_velocity=0.1
      ContactParametersSet contact_parameters:
        ContactParameters: geometry=(platform heel_l ball_big_toe_l small_toe_l) stiffness=100000000 dissipation=0.5
            static_friction=0.9 dynamic_friction=0.9 viscous_friction=0.6
    BushingForce BackBushing: socket_frame1=pelvis_offset socket_frame2=/bodyset/torso
        rotational_stiffness=(50 50 10) [Nm/rad] translational_stiffness=(0 0 0) [N/m]
        rotational_damping=(1 1 0) [Nm/(rad/s)] translational_damping=(0 0 0) [N/(m/s)]
      PhysicalOffsetFrame pelvis_offset: socket_parent=/bodyset/pelvis translation=(-0.1007 0.0815 0)
    BushingForce ankle_r_bushing: socket_frame1=tibia_r_offset socket_frame2=calcn_r_offset
        rotational_stiffness=(20 5 5) translational_stiffness=(0 0 0) rotational_damping=(0.1 0.1 0.1)
        translational_damping=(0 0 0)
      PhysicalOffsetFrame tibia_r_offset: socket_parent=/bodyset/tibia_r translation=(0 -0.43 0)
      PhysicalOffsetFrame calcn_r_offset: socket_parent=/bodyset/calcn_r translation=(0.04877 0.04195 -0.00792)
    BushingForce ankle_l_bushing: socket_frame1=tibia_l_offset socket_frame2=calcn_l_offset
        rotational_stiffness=(20 5 5) translational_stiffness=(0 0 0) rotational_damping=(0.1 0.1 0.1)
        translational_damping=(0 0 0)
      PhysicalOffsetFrame tibia_l_offset: socket_parent=/bodyset/tibia_l translation=(0 -0.43 0)
      PhysicalOffsetFrame calcn_l_offset: socket_parent=/bodyset/calcn_l translation=(0.04877 0.04195 0.00792)
    CoordinateLimitForce LumbarExtensionLimit: coordinate=lumbar_extension upper_stiffness=20 [N*m/degree]
        upper_limit=25 [degrees] lower_stiffness=20 [N*m/degree] lower_limit=-35 [degrees] damping=0.25
        transition=10 [degrees]
    CoordinateLimitForce KneeLimit_r: coordinate=knee_angle_r upper_stiffness=20 upper_limit=-5 lower_stiffness=10
        lower_limit=-120 damping=0.25 transition=10
    CoordinateLimitForce KneeLimit_l: coordinate=knee_angle_l upper_stiffness=20 upper_limit=-5 lower_stiffness=10
        lower_limit=-120 damping=0.25 transition=10
    ObjectGroup R_select_muscles: members=(ercspn_r intobl_r glut_max1_r glut_med1_r bifemlh_r rect_fem_r vas_int_r med_gas_r soleus_r tib_ant_r)
    ObjectGroup R_hip_abd: members=(glut_max1_r glut_med1_r glut_med2_r glut_med3_r peri_r sar_r tfl_r)
    ObjectGroup R_hip_flex: members=(glut_med1_r grac_r iliacus_r pect_r psoas_r rect_fem_r sar_r tfl_r)
    ObjectGroup R_hip_inrot: members=(glut_med1_r iliacus_r psoas_r tfl_r)
    ObjectGroup R_hip_exrot: members=(gem_r glut_med3_r peri_r quad_fem_r)
    ObjectGroup R_hip_ext: members=(add_mag2_r bifemlh_r glut_max1_r glut_max2_r glut_max3_r glut_med3_r)
    ObjectGroup R_hip_add: members=(add_mag2_r bifemlh_r grac_r pect_r)
    ObjectGroup R_knee_bend: members=(bifemlh_r bifemsh_r grac_r med_gas_r sar_r)
    ObjectGroup R_knee_ext: members=(rect_fem_r vas_int_r)
    ObjectGroup R_ankle_pf: members=(flex_dig_r flex_hal_r lat_gas_r med_gas_r per_brev_r per_long_r soleus_r tib_post_r)
    ObjectGroup R_inverter: members=(ext_hal_r flex_dig_r flex_hal_r tib_ant_r tib_post_r)
    ObjectGroup R_ankle_df: members=(ext_dig_r ext_hal_r per_tert_r tib_ant_r)
    ObjectGroup R_everter: members=(ext_dig_r per_brev_r per_long_r per_tert_r)
    ObjectGroup L_hip_abd: members=(glut_max1_l glut_med1_l glut_med2_l glut_med3_l peri_l sar_l tfl_l)
    ObjectGroup L_hip_flex: members=(glut_med1_l grac_l iliacus_l pect_l psoas_l rect_fem_l sar_l tfl_l)
    ObjectGroup L_hip_inrot: members=(glut_med1_l iliacus_l psoas_l tfl_l)
    ObjectGroup L_hip_exrot: members=(gem_l glut_med3_l peri_l quad_fem_l)
    ObjectGroup L_hip_ext: members=(add_mag2_l bifemlh_l glut_max1_l glut_max2_l glut_max3_l glut_med3_l)
    ObjectGroup L_hip_add: members=(add_mag2_l bifemlh_l grac_l pect_l)
    ObjectGroup L_knee_bend: members=(bifemlh_l bifemsh_l grac_l med_gas_l sar_l)
    ObjectGroup L_knee_ext: members=(rect_fem_l vas_int_l)
    ObjectGroup L_ankle_pf: members=(med_gas_l soleus_l tib_post_l)
    ObjectGroup L_inverter: members=(tib_ant_l tib_post_l)
    ObjectGroup L_ankle_df: members=tib_ant_l
    ObjectGroup L_ankle_pf: members=(flex_dig_l flex_hal_l lat_gas_l med_gas_l per_brev_l per_long_l soleus_l tib_post_l)
    ObjectGroup L_inverter: members=(ext_hal_l flex_dig_l flex_hal_l tib_ant_l tib_post_l)
    ObjectGroup L_ankle_df: members=(ext_dig_l ext_hal_l per_tert_l tib_ant_l)
    ObjectGroup L_everter: members=(ext_dig_l per_brev_l per_long_l per_tert_l)
    ObjectGroup back_ext: members=(ercspn_l ercspn_r)
    ObjectGroup back_rlb: members=(ercspn_r extobl_r intobl_r)
    ObjectGroup back_introt: members=(ercspn_r extobl_l intobl_r)
    ObjectGroup back_llb: members=(ercspn_l extobl_l intobl_l)
    ObjectGroup back_extrot: members=(ercspn_l extobl_r intobl_l)
    ObjectGroup back_flex: members=(extobl_l extobl_r intobl_l intobl_r)
  ContactGeometrySet:
    ContactHalfSpace platform: socket_frame=/bodyset/platform location=(0 0 0) orientation=(0 0 -1.570796)
    ContactSphere heel_r: socket_frame=/bodyset/calcn_r location=(0.01 0.01 -0.005) radius=0.03
    ContactSphere ball_big_toe_r: socket_frame=/bodyset/toes_r location=(-0.005 0.005 -0.03) radius=0.02
    ContactSphere small_toe_r: socket_frame=/bodyset/toes_r location=(-0.04 0.005 0.04) radius=0.015
    ContactSphere heel_l: socket_frame=/bodyset/calcn_l location=(0.01 0.01 0.005) radius=0.03
    ContactSphere ball_big_toe_l: socket_frame=/bodyset/toes_l location=(-0.005 0.005 0.03) radius=0.02
    ContactSphere small_toe_l: socket_frame=/bodyset/toes_l location=(-0.04 0.005 -0.04) radius=0.015
