# OpenSim document version 40000
Model bicep_curl:
  SimpleSpindle muscle_spindle: socket_muscle=/forceset/biceps normalized_rest_length=0.3
  GolgiTendon muscle_golgi: socket_muscle=/forceset/biceps
  MuscleReflexCircuit mrc: socket_muscle=/forceset/biceps socket_spindle=/muscle_spindle socket_golgi=/muscle_golgi
      defaultControlSignal=0.09 timeDelay=0.1 threshold=0.015 weights=(1 7 -0.5)
    Delay: input_signal=/mrc/interneuron|interneuron_signal delay=0.1 [seconds] defaultControlSignal=0.09
    Interneuron: input_afferents=(/muscle_spindle|spindle_length /muscle_spindle|spindle_speed /muscle_golgi|golgiLength)
        threshold=0.015 weights=(1 7 -0.5)
  ConsoleReporter__double_ reporter: report_time_interval=1 [s]
      input_inputs=(/forceset/biceps|fiber_length /forceset/biceps|tendon_length /muscle_spindle|spindle_length /muscle_spindle|spindle_speed /muscle_golgi|golgiLength /mrc|muscle_signal)
  Ground
  BodySet:
    Body humerus: mass=1 [kg] mass_center=(0 0 0) inertia=(0 0 0 0 0 0)
      PhysicalOffsetFrame humerusCenter: socket_parent=.. translation=(0 0.5 0) [meters]
        Ellipsoid humerusCenter_geom_1: radii=(0.1 0.5 0.1)
    Body radius: mass=1 mass_center=(0 0 0) inertia=(0 0 0 0 0 0)
      PhysicalOffsetFrame radiusCenter: socket_parent=.. translation=(0 0.5 0)
        Ellipsoid radiusCenter_geom_1: radii=(0.1 0.5 0.1)
  JointSet:
    PinJoint shoulder: socket_parent_frame=ground_offset socket_child_frame=humerus_offset
      Coordinate shoulder_coord_0
      PhysicalOffsetFrame ground_offset: socket_parent=/ground translation=(0 0 0)
      PhysicalOffsetFrame humerus_offset: socket_parent=/bodyset/humerus translation=(0 1 0)
    PinJoint elbow: socket_parent_frame=humerus_offset socket_child_frame=radius_offset
      Coordinate elbow_coord_0
      PhysicalOffsetFrame humerus_offset: socket_parent=/bodyset/humerus translation=(0 0 0)
      PhysicalOffsetFrame radius_offset: socket_parent=/bodyset/radius translation=(0 1 0)
  ControllerSet:
    MuscleReflexController brain: actuator_list=biceps muscleReflexCircuit_list=mrc gain=2
  ForceSet:
    Millard2012EquilibriumMuscle biceps: min_control=0.01 max_control=1 max_isometric_force=200
        optimal_fiber_length=0.6 tendon_slack_length=0.55 pennation_angle_at_optimal=0 [radians]
      PathPoint origin: humerus (0 0.8 0)
      PathPoint insertion: radius (0 0.7 0)
      ActiveForceLengthCurve: minimum_value=0
      ForceVelocityCurve: concentric_slope_at_vmax=0 concentric_slope_near_vmax=0.25 isometric_slope=5
          eccentric_slope_at_vmax=0 eccentric_slope_near_vmax=0.15 max_eccentric_velocity_force_multiplier=1.4
      FiberForceLengthCurve
      TendonForceLengthCurve
