# OpenSim document version 40000
Model tugofWar:
  ConsoleReporter__double_ reporter: report_time_interval=1 [s] input_inputs=/forceset/original1|fiber_force
  Ground
  BodySet:
    Body block: mass=20 [kg] mass_center=(0 0 0) inertia=(0.1333333 0.1333333 0.1333333 0 0 0)
  JointSet:
    FreeJoint blockToGround: socket_parent_frame=ground_offset socket_child_frame=block_offset
      Coordinate blockToGround_coord_0: range=(-1.570796 1.570796)
      Coordinate blockToGround_coord_1: range=(-1.570796 1.570796)
      Coordinate blockToGround_coord_2: range=(-1.570796 1.570796)
      Coordinate blockToGround_coord_3: range=(-1 1)
      Coordinate blockToGround_coord_4: range=(-1 1)
      Coordinate blockToGround_coord_5: range=(-1 1)
      PhysicalOffsetFrame ground_offset: socket_parent=/ground translation=(0 0.05 0) [meters]
      PhysicalOffsetFrame block_offset: socket_parent=/bodyset/block translation=(0 0.05 0)
  ControllerSet:
    PrescribedController: actuator_list=(original1 original2)
      FunctionSet ControlFunctions: Constant(value=1) Constant(value=1)
  ForceSet:
    Millard2012EquilibriumMuscle original1: min_control=0.01 max_control=1 max_isometric_force=1000
        optimal_fiber_length=0.2 tendon_slack_length=0.1 pennation_angle_at_optimal=0 [radians] default_activation=0.1
        default_fiber_length=0.2
      PathPoint point1: ground (0 0.05 0.35)
      PathPoint point2: block (0 0.05 0.05)
      ActiveForceLengthCurve: minimum_value=0
      ForceVelocityCurve: concentric_slope_at_vmax=0 concentric_slope_near_vmax=0.25 isometric_slope=5
          eccentric_slope_at_vmax=0 eccentric_slope_near_vmax=0.15 max_eccentric_velocity_force_multiplier=1.4
      FiberForceLengthCurve
      TendonForceLengthCurve
    Millard2012EquilibriumMuscle original2: min_control=0.01 max_control=1 max_isometric_force=1000
        optimal_fiber_length=0.2 tendon_slack_length=0.1 pennation_angle_at_optimal=0 default_activation=0.01
        default_fiber_length=0.2
      PathPoint point1: ground (0 0.05 0.35)
      PathPoint point2: block (0 0.05 0.05)
      ActiveForceLengthCurve: minimum_value=0
      ForceVelocityCurve: concentric_slope_at_vmax=0 concentric_slope_near_vmax=0.25 isometric_slope=5
          eccentric_slope_at_vmax=0 eccentric_slope_near_vmax=0.15 max_eccentric_velocity_force_multiplier=1.4
      FiberForceLengthCurve
      TendonForceLengthCurve
